# OpenSim document version 40000
Model StanfordVAUpperLimbModelv40Modified:
  gravity: 0 -9.80665 0
  length_units: meters
  force_units: N
  credits:
    Original: Katherine Holzbaur, Stanford University. Inertial properties modified by Marc Carmichael, Robotics Institute (UTS:RI), University of Techonology Sydney. Updated to OpenSim 4.x and modified muscleset by Yujun Lai, Robotics Institute (UTS:RI), University of Technology Sydney.
  Ground
  BodySet:
    Body ground: mass=1e-8 [kg] mass_center=(1e-8 1e-8 1e-8) inertia=(1e-8 1e-8 1e-8 1e-8 1e-8 1e-8)
    Body thorax: mass=1e-8 mass_center=(1e-8 1e-8 1e-8) inertia=(1e-8 1e-8 1e-8 1e-8 1e-8 1e-8)
      WrapEllipsoid Thorax: xyz_body_rotation=(0.0434587 -0.3319616 0.1898918) translation=(-0.0386 -0.1273 0.0709)
          quadrant=all dimensions=(0.1 0.135 0.08)
    Body clavicle: mass=1e-8 mass_center=(1e-8 1e-8 1e-8) inertia=(1e-8 1e-8 1e-8 1e-8 1e-8 1e-8)
    Body clavphant: mass=1e-8 mass_center=(1e-8 1e-8 1e-8) inertia=(1e-8 1e-8 1e-8 1e-8 1e-8 1e-8)
    Body scapula: mass=1e-8 mass_center=(1e-8 1e-8 1e-8) inertia=(1e-8 1e-8 1e-8 1e-8 1e-8 1e-8)
      WrapEllipsoid Deltoid2: xyz_body_rotation=(3.130423 -1.548805 -1.314233) translation=(-0.0058 -0.0378 0.0096)
          quadrant=-y dimensions=(0.03 0.04 0.035)
      WrapTorus Delt3: xyz_body_rotation=(0.6209881 0.32882 -0.5607743) translation=(-0.0973 -0.0428 -0.037)
          quadrant=all inner_radius=0.04 outer_radius=0.06
      WrapTorus INFSP: xyz_body_rotation=(0.02530727 0.5883505 0.1518436) translation=(-0.0561 -0.0199 -0.0112)
          quadrant=all inner_radius=0.008 outer_radius=0.019
      WrapEllipsoid TMIN: xyz_body_rotation=(-2.097537 -0.2808235 -1.763481) translation=(-0.0418 -0.0519 -0.0359)
          quadrant=x dimensions=(0.03 0.03 0.05)
      WrapCylinder TRIlongglen: xyz_body_rotation=(1.375319 -0.2946116 2.435956) translation=(-0.0359 -0.0309 -0.0132)
          quadrant=x radius=0.003 length=0.03
    Body scapphant: mass=1e-8 mass_center=(1e-8 1e-8 1e-8) inertia=(1e-8 1e-8 1e-8 1e-8 1e-8 1e-8)
    Body humphant: mass=1e-8 mass_center=(1e-8 1e-8 1e-8) inertia=(1e-8 1e-8 1e-8 1e-8 1e-8 1e-8)
    Body humphant1: mass=1e-8 mass_center=(1e-8 1e-8 1e-8) inertia=(1e-8 1e-8 1e-8 1e-8 1e-8 1e-8)
    Body humerus: mass=2.184 mass_center=(1e-8 -0.141918 1e-8) inertia=(0.0133 0.0022 0.01327 1e-8 1e-8 1e-8)
      WrapEllipsoid DELT1hh: xyz_body_rotation=(0.05846853 1.004612 0.5703736) translation=(-0.0139 -0.0127 -0.0262)
          quadrant=z dimensions=(0.03 0.1 0.05)
      WrapCylinder delt2hum: xyz_body_rotation=(1.680927 -0.02495821 0.05166175) translation=(0.0017 -0.0958 0.0011)
          quadrant=all radius=0.0094 length=0.05
      WrapEllipsoid delt3hum: xyz_body_rotation=(1.727352 0.07592182 -2.743134) translation=(0.0019 -0.0592 0.0011)
          quadrant=x dimensions=(0.01 0.01 0.05)
      WrapEllipsoid SUPSP: xyz_body_rotation=(0.03804818 0.00855211 -1.306728) translation=(0.0002 0.0077 0.0043)
          quadrant=all dimensions=(0.02 0.02 0.02)
      WrapEllipsoid INFSP_and_TMIN_hum_head: xyz_body_rotation=(-0.2865831 -0.00907571 -0.06841691)
          translation=(-0.0003 0.0026 0.0038) quadrant=all dimensions=(0.02 0.025 0.02)
      WrapEllipsoid SUBSCAP: xyz_body_rotation=(-0.9245009 0.288852 0.381529) translation=(-0.0025 0.0007 -0.0045)
          quadrant=all dimensions=(0.02 0.017 0.028)
      WrapCylinder TMINhum: xyz_body_rotation=(1.753532 0.06928957 2.746276) translation=(-0.0014 -0.0455 0) quadrant=x
          radius=0.007 length=0.07
      WrapSphere TMAJ_LAT_PEC_CORBhh: translation=(0.0007 0 0.006) quadrant=all radius=0.03
      WrapCylinder TMAJ_LAThum: xyz_body_rotation=(1.536413 -0.06370452 1.41424) translation=(0.0007 -0.0443 -0.0055)
          quadrant=-x radius=0.007 length=0.04
      WrapEllipsoid PEC1hh: xyz_body_rotation=(-0.6204646 -0.3104941 0.3637266) translation=(-0.0037 0.0005 -0.0025)
          quadrant=-z dimensions=(0.03 0.02 0.02)
      WrapCylinder PEC12hum: xyz_body_rotation=(1.559277 -0.07749262 -0.9258972) translation=(0.002 -0.0508 -0.0017)
          quadrant=x radius=0.009 length=0.07
      WrapSphere PEC23hh: translation=(-0.0086 0.0021 -0.0004) quadrant=all radius=0.02
      WrapCylinder PEC3hum: xyz_body_rotation=(1.440944 -0.0561996 1.751961) translation=(0.0009 -0.0551 -0.0004)
          quadrant=-x radius=0.008 length=0.07
      WrapCylinder LAT_TMAJhh: xyz_body_rotation=(-0.3050835 -0.01832596 -0.6866125)
          translation=(-0.0224 0.0102 0.0094) quadrant=-y radius=0.007 length=0.045
      WrapSphere LAT_TMAJ2hh: xyz_body_rotation=(-0.1272345 0.2761111 0.01972222) translation=(-0.0016 0.0092 0.0052)
          quadrant=-z radius=0.03
      WrapCylinder CORBhum: xyz_body_rotation=(-1.608321 0.09599311 0.8752826) translation=(0.0027 -0.1202 -0.0059)
          quadrant=x radius=0.008 length=0.05
      WrapEllipsoid TRIlonghh: xyz_body_rotation=(3.001617 -0.853466 2.574186) translation=(-0.0078 -0.0041 -0.0014)
          quadrant=z dimensions=(0.035 0.02 0.02)
      WrapCylinder TRI: xyz_body_rotation=(-0.1401499 -0.00628319 0.1549852) translation=(0.0028 -0.2919 -0.0119)
          quadrant=all radius=0.016 length=0.04
      WrapEllipsoid ANC: xyz_body_rotation=(0.00750492 -0.1966986 1.049292) translation=(0.0134 -0.2861 -0.0008)
          quadrant=-x dimensions=(0.02 0.02 0.02)
      WrapEllipsoid BIClong: xyz_body_rotation=(-2.004336 -1.001644 0.9754645) translation=(0.0033 0.0073 0.0003)
          quadrant=-y dimensions=(0.025 0.02 0.02)
      WrapEllipsoid Elbow_BIC_BRD: xyz_body_rotation=(-0.1286308 0.1375319 0.03071779)
          translation=(0.0019 -0.289 -0.014) quadrant=x dimensions=(0.015 0.015 0.1)
      WrapEllipsoid Elbow_PT_ECRL: xyz_body_rotation=(-0.1610939 -0.1108284 0.6145304)
          translation=(0.003 -0.2872 -0.0069) quadrant=x dimensions=(0.018 0.025 0.035)
    Body ulna: mass=1e-8 mass_center=(1e-8 1e-8 1e-8) inertia=(1e-8 1e-8 1e-8 1e-8 1e-8 1e-8)
      WrapCylinder PQ2: xyz_body_rotation=(1.391376 0.06894051 1.522451) translation=(-0.0012 -0.2092 0.0428)
          quadrant=all radius=0.007 length=0.01
    Body radius: mass=1.248 mass_center=(1e-8 -0.109865 1e-8) inertia=(0.00669 0.00088 0.00645 1e-8 1e-8 1e-8)
      WrapCylinder SUP: xyz_body_rotation=(1.447751 0.3040364 -2.441017) translation=(0.0045 -0.0437 0.0059)
          quadrant=-x radius=0.008 length=0.04
      WrapTorus ECU: xyz_body_rotation=(-0.9866346 -0.1488766 0.222704) translation=(-0.0163 -0.2417 0.0349)
          quadrant=all inner_radius=0.006 outer_radius=0.009
      WrapCylinder PQ1: xyz_body_rotation=(-1.607623 -0.0127409 -2.690251) translation=(0.0281 -0.1986 0.0288)
          quadrant=all radius=0.01 length=0.01
    Body lunate: mass=1e-8 mass_center=(1e-8 1e-8 1e-8) inertia=(1e-8 1e-8 1e-8 1e-8 1e-8 1e-8)
      WrapEllipsoid Extensor_ellipse: xyz_body_rotation=(-0.2508038 0.2855359 0.2328269)
          translation=(0.0007 -0.0135 0.0047) quadrant=z dimensions=(0.05 0.02 0.013)
      WrapTorus ECRL: xyz_body_rotation=(1.538333 0.2343977 0.7311184) translation=(0.0222 -0.0096 0.0208) quadrant=all
          inner_radius=0.008 outer_radius=0.016
      WrapTorus ECRB: xyz_body_rotation=(1.312662 -0.1178097 -0.1162389) translation=(0.0126 -0.0095 0.0186)
          quadrant=all inner_radius=0.008 outer_radius=0.01
      WrapTorus FCR: xyz_body_rotation=(-1.555961 -0.1532399 -0.1000074) translation=(0.0032 -0.0045 -0.019)
          quadrant=all inner_radius=0.001 outer_radius=0.0025
      WrapTorus FCU: xyz_body_rotation=(-1.573763 -0.07976155 0.39235) translation=(-0.0123 -0.0124 -0.0171)
          quadrant=all inner_radius=0.0068 outer_radius=0.008
      WrapEllipsoid PL: xyz_body_rotation=(-0.03159046 0.0996583 0.06335545) translation=(0.0057 -0.018 -0.0041)
          quadrant=-z dimensions=(0.025 0.014 0.012)
      WrapEllipsoid FDS: xyz_body_rotation=(0.00837758 -0.08168141 -0.01710423) translation=(0.0012 -0.0057 -0.0003)
          quadrant=-z dimensions=(0.025 0.013 0.012)
      WrapEllipsoid FDP: xyz_body_rotation=(-1.467473 -0.1946042 0.121824) translation=(-0.0022 -0.0069 0.0032)
          quadrant=y dimensions=(0.025 0.013 0.012)
      WrapTorus EDCL: xyz_body_rotation=(2.363176 0.1930334 -0.2691298) translation=(-0.0128 -0.0133 0.0148)
          quadrant=all inner_radius=0.008 outer_radius=0.012
      WrapTorus EDCR: xyz_body_rotation=(1.983916 0.100531 0.5230752) translation=(-0.0098 -0.0137 0.0166) quadrant=all
          inner_radius=0.009 outer_radius=0.011
      WrapTorus EDCM: xyz_body_rotation=(1.993166 0.1979203 0.3682645) translation=(-0.0007 -0.0117 0.0191)
          quadrant=all inner_radius=0.009 outer_radius=0.012
      WrapTorus EDCI: xyz_body_rotation=(1.697682 0.08970992 0.00767945) translation=(0.009 -0.0149 0.0211)
          quadrant=all inner_radius=0.009 outer_radius=0.012
      WrapEllipsoid EDM: xyz_body_rotation=(2.962696 0.1593486 0.1179843) translation=(-0.0167 -0.0022 0.0048)
          quadrant=-z dimensions=(0.018 0.014 0.008)
      WrapEllipsoid FPL: xyz_body_rotation=(-0.1663299 -0.08220501 -0.06597345) translation=(0.017 -0.025 -0.0033)
          quadrant=-z dimensions=(0.016 0.01 0.01)
    Body scaphoid: mass=1e-8 mass_center=(1e-8 1e-8 1e-8) inertia=(1e-8 1e-8 1e-8 1e-8 1e-8 1e-8)
    Body pisiform: mass=1e-8 mass_center=(1e-8 1e-8 1e-8) inertia=(1e-8 1e-8 1e-8 1e-8 1e-8 1e-8)
    Body triquetrum: mass=1e-8 mass_center=(1e-8 1e-8 1e-8) inertia=(1e-8 1e-8 1e-8 1e-8 1e-8 1e-8)
    Body capitate: mass=0.468 mass_center=(1e-8 -0.0094 1e-8) inertia=(0.000615 0.000215 0.000754 1e-8 1e-8 1e-8)
    Body trapezium: mass=1e-8 mass_center=(1e-8 1e-8 1e-8) inertia=(1e-8 1e-8 1e-8 1e-8 1e-8 1e-8)
    Body trapezoid: mass=1e-8 mass_center=(1e-8 1e-8 1e-8) inertia=(1e-8 1e-8 1e-8 1e-8 1e-8 1e-8)
    Body hamate: mass=1e-8 mass_center=(1e-8 1e-8 1e-8) inertia=(1e-8 1e-8 1e-8 1e-8 1e-8 1e-8)
    Body firstmc1: mass=1e-8 mass_center=(1e-8 1e-8 1e-8) inertia=(1e-8 1e-8 1e-8 1e-8 1e-8 1e-8)
      WrapTorus APL: xyz_body_rotation=(-1.609892 0.2478367 -0.0301942) translation=(0.0082 0.0023 -0.0101)
          quadrant=all inner_radius=0.004 outer_radius=0.008
    Body firstmc: mass=1e-8 mass_center=(1e-8 1e-8 1e-8) inertia=(1e-8 1e-8 1e-8 1e-8 1e-8 1e-8)
      WrapCylinder MPthumb: xyz_body_rotation=(0.3213151 0.1101303 -0.834791) translation=(0.0177 -0.0305 -0.0143)
          quadrant=all radius=0.0085 length=0.02
    Body secondmc: mass=1e-8 mass_center=(1e-8 1e-8 1e-8) inertia=(1e-8 1e-8 1e-8 1e-8 1e-8 1e-8)
      WrapEllipsoid 2ndmcp: xyz_body_rotation=(1.486671 -1.296605 2.43072) translation=(0.0059 -0.0304 -0.0006)
          quadrant=-x dimensions=(0.005 0.005 0.03)
    Body thirdmc: mass=1e-8 mass_center=(1e-8 1e-8 1e-8) inertia=(1e-8 1e-8 1e-8 1e-8 1e-8 1e-8)
    Body fourthmc: mass=1e-8 mass_center=(1e-8 1e-8 1e-8) inertia=(1e-8 1e-8 1e-8 1e-8 1e-8 1e-8)
    Body fifthmc: mass=1e-8 mass_center=(1e-8 1e-8 1e-8) inertia=(1e-8 1e-8 1e-8 1e-8 1e-8 1e-8)
    Body proximal_thumb: mass=1e-8 mass_center=(1e-8 1e-8 1e-8) inertia=(1e-8 1e-8 1e-8 1e-8 1e-8 1e-8)
      WrapCylinder IPthumb: xyz_body_rotation=(0.3047345 0.01291544 0.08796459) translation=(0.0121 -0.0302 -0.0096)
          quadrant=-x radius=0.0045 length=0.01
    Body distal_thumb: mass=1e-8 mass_center=(1e-8 1e-8 1e-8) inertia=(1e-8 1e-8 1e-8 1e-8 1e-8 1e-8)
    Body 2proxph: mass=1e-8 mass_center=(1e-8 1e-8 1e-8) inertia=(1e-8 1e-8 1e-8 1e-8 1e-8 1e-8)
      WrapCylinder Secondpm: xyz_body_rotation=(0.7419395 -1.473931 0.7096509) translation=(0.0075 -0.0407 0.0061)
          quadrant=all radius=0.004 length=0.01
    Body 2midph: mass=1e-8 mass_center=(1e-8 1e-8 1e-8) inertia=(1e-8 1e-8 1e-8 1e-8 1e-8 1e-8)
      WrapCylinder Secondmd: xyz_body_rotation=(0.5017822 -1.413019 0.6473426) translation=(0.0036 -0.0243 0.0003)
          quadrant=x radius=0.003 length=0.01
    Body 2distph: mass=1e-8 mass_center=(1e-8 1e-8 1e-8) inertia=(1e-8 1e-8 1e-8 1e-8 1e-8 1e-8)
    Body 3proxph: mass=1e-8 mass_center=(1e-8 1e-8 1e-8) inertia=(1e-8 1e-8 1e-8 1e-8 1e-8 1e-8)
    Body 3midph: mass=1e-8 mass_center=(1e-8 1e-8 1e-8) inertia=(1e-8 1e-8 1e-8 1e-8 1e-8 1e-8)
    Body 3distph: mass=1e-8 mass_center=(1e-8 1e-8 1e-8) inertia=(1e-8 1e-8 1e-8 1e-8 1e-8 1e-8)
    Body 4proxph: mass=1e-8 mass_center=(1e-8 1e-8 1e-8) inertia=(1e-8 1e-8 1e-8 1e-8 1e-8 1e-8)
    Body 4midph: mass=1e-8 mass_center=(1e-8 1e-8 1e-8) inertia=(1e-8 1e-8 1e-8 1e-8 1e-8 1e-8)
    Body 4distph: mass=1e-8 mass_center=(1e-8 1e-8 1e-8) inertia=(1e-8 1e-8 1e-8 1e-8 1e-8 1e-8)
    Body 5proxph: mass=1e-8 mass_center=(1e-8 1e-8 1e-8) inertia=(1e-8 1e-8 1e-8 1e-8 1e-8 1e-8)
    Body 5midph: mass=1e-8 mass_center=(1e-8 1e-8 1e-8) inertia=(1e-8 1e-8 1e-8 1e-8 1e-8 1e-8)
    Body 5distph: mass=1e-8 mass_center=(1e-8 1e-8 1e-8) inertia=(1e-8 1e-8 1e-8 1e-8 1e-8 1e-8)
    Body bicpt: mass=1e-8 mass_center=(1e-8 1e-8 1e-8) inertia=(1e-8 1e-8 1e-8 1e-8 1e-8 1e-8)
    Body bicpt2: mass=1e-8 mass_center=(1e-8 1e-8 1e-8) inertia=(1e-8 1e-8 1e-8 1e-8 1e-8 1e-8)
    Body ptpt: mass=1e-8 mass_center=(1e-8 1e-8 1e-8) inertia=(1e-8 1e-8 1e-8 1e-8 1e-8 1e-8)
    Body FCUpt: mass=1e-8 mass_center=(1e-8 1e-8 1e-8) inertia=(1e-8 1e-8 1e-8 1e-8 1e-8 1e-8)
    Body EDCpt: mass=1e-8 mass_center=(1e-8 1e-8 1e-8) inertia=(1e-8 1e-8 1e-8 1e-8 1e-8 1e-8)
    Body APLpt: mass=1e-8 mass_center=(1e-8 1e-8 1e-8) inertia=(1e-8 1e-8 1e-8 1e-8 1e-8 1e-8)
    Body FPLpt: mass=1e-8 mass_center=(1e-8 1e-8 1e-8) inertia=(1e-8 1e-8 1e-8 1e-8 1e-8 1e-8)
    Body FPLpt2: mass=1e-8 mass_center=(1e-8 1e-8 1e-8) inertia=(1e-8 1e-8 1e-8 1e-8 1e-8 1e-8)
    Body PEC1pt2: mass=1e-8 mass_center=(1e-8 1e-8 1e-8) inertia=(1e-8 1e-8 1e-8 1e-8 1e-8 1e-8)
    Body PEC1pt3: mass=1e-8 mass_center=(1e-8 1e-8 1e-8) inertia=(1e-8 1e-8 1e-8 1e-8 1e-8 1e-8)
    Body PEC2pt2: mass=1e-8 mass_center=(1e-8 1e-8 1e-8) inertia=(1e-8 1e-8 1e-8 1e-8 1e-8 1e-8)
    Body PEC2pt3: mass=1e-8 mass_center=(1e-8 1e-8 1e-8) inertia=(1e-8 1e-8 1e-8 1e-8 1e-8 1e-8)
    Body PEC3pt2: mass=1e-8 mass_center=(1e-8 1e-8 1e-8) inertia=(1e-8 1e-8 1e-8 1e-8 1e-8 1e-8)
    Body PEC3pt3: mass=1e-8 mass_center=(1e-8 1e-8 1e-8) inertia=(1e-8 1e-8 1e-8 1e-8 1e-8 1e-8)
    Body DELT2pt2a: mass=1e-8 mass_center=(1e-8 1e-8 1e-8) inertia=(1e-8 1e-8 1e-8 1e-8 1e-8 1e-8)
    Body DELT2pt2: mass=1e-8 mass_center=(1e-8 1e-8 1e-8) inertia=(1e-8 1e-8 1e-8 1e-8 1e-8 1e-8)
    Body LAT1pt2: mass=1e-8 mass_center=(1e-8 1e-8 1e-8) inertia=(1e-8 1e-8 1e-8 1e-8 1e-8 1e-8)
    Body LAT1pt3: mass=1e-8 mass_center=(1e-8 1e-8 1e-8) inertia=(1e-8 1e-8 1e-8 1e-8 1e-8 1e-8)
    Body LAT2pt2: mass=1e-8 mass_center=(1e-8 1e-8 1e-8) inertia=(1e-8 1e-8 1e-8 1e-8 1e-8 1e-8)
    Body LAT2pt3: mass=1e-8 mass_center=(1e-8 1e-8 1e-8) inertia=(1e-8 1e-8 1e-8 1e-8 1e-8 1e-8)
    Body LAT3pt2: mass=1e-8 mass_center=(1e-8 1e-8 1e-8) inertia=(1e-8 1e-8 1e-8 1e-8 1e-8 1e-8)
    Body LAT3pt3: mass=1e-8 mass_center=(1e-8 1e-8 1e-8) inertia=(1e-8 1e-8 1e-8 1e-8 1e-8 1e-8)
  JointSet:
    WeldJoint gnd_body: socket_parent_frame=/ground socket_child_frame=/bodyset/ground
    WeldJoint ground_thorax: socket_parent_frame=ground_offset socket_child_frame=/bodyset/thorax
      PhysicalOffsetFrame ground_offset: socket_parent=/bodyset/ground translation=(0 0 0) [meters]
    CustomJoint sternoclavicular: socket_parent_frame=thorax_offset socket_child_frame=/bodyset/clavicle
      Coordinate sternoclavicular_r2: default_value=0 range=(-99999.9 99999.9) clamped=false
      Coordinate sternoclavicular_r3: default_value=0 range=(-99999.9 99999.9) clamped=false
      PhysicalOffsetFrame thorax_offset: socket_parent=/bodyset/thorax translation=(0.006325 0.00693 0.025465)
      SpatialTransform: axes_held_at_zero=(rotation3 translation1 translation2 translation3)
        TransformAxis rotation1: coordinates=sternoclavicular_r2 axis=(0.0153 0.9892987 -0.1451)
            LinearFunction(coefficients=1 0)
        TransformAxis rotation2: coordinates=sternoclavicular_r3 axis=(-0.9944725 0 -0.104997)
            LinearFunction(coefficients=1 0)
    CustomJoint unrotscap: socket_parent_frame=clavicle_offset socket_child_frame=/bodyset/clavphant
      Coordinate unrotscap_r3: default_value=0 range=(-99999.9 99999.9) clamped=false
      Coordinate unrotscap_r2: default_value=0 range=(-99999.9 99999.9) clamped=false
      PhysicalOffsetFrame clavicle_offset: socket_parent=/bodyset/clavicle translation=(-0.01433 0.02007 0.135535)
      SpatialTransform: axes_held_at_zero=(rotation3 translation1 translation2 translation3)
        TransformAxis rotation1: coordinates=unrotscap_r3 axis=(-0.9944725 0 -0.104997)
            LinearFunction(coefficients=1 0)
        TransformAxis rotation2: coordinates=unrotscap_r2 axis=(0.0153 0.9892987 -0.1451)
            LinearFunction(coefficients=1 0)
    CustomJoint acromioclavicular: socket_parent_frame=clavphant_offset socket_child_frame=/bodyset/scapula
      Coordinate acromioclavicular_r2: default_value=0 range=(-99999.9 99999.9) clamped=false
      Coordinate acromioclavicular_r3: default_value=0 range=(-99999.9 99999.9) clamped=false
      Coordinate acromioclavicular_r1: default_value=0 range=(-99999.9 99999.9) clamped=false
      PhysicalOffsetFrame clavphant_offset: socket_parent=/bodyset/clavphant translation=(0 0 0)
      SpatialTransform: axes_held_at_zero=(translation1 translation2 translation3)
        TransformAxis rotation1: coordinates=acromioclavicular_r2 axis=(0.1570949 0.9472686 -0.2792909)
            LinearFunction(coefficients=1 0)
        TransformAxis rotation2: coordinates=acromioclavicular_r3 axis=(-0.754084 0.297594 0.585487)
            LinearFunction(coefficients=1 0)
        TransformAxis rotation3: coordinates=acromioclavicular_r1 axis=(0.6376998 0.1186 0.7610998) Constant(value=0)
    CustomJoint unrothum: socket_parent_frame=scapula_offset socket_child_frame=/bodyset/scapphant
      Coordinate unrothum_r1: default_value=0 range=(-99999.9 99999.9) clamped=false
      Coordinate unrothum_r3: default_value=0 range=(-99999.9 99999.9) clamped=false
      Coordinate unrothum_r2: default_value=0 range=(-99999.9 99999.9) clamped=false
      PhysicalOffsetFrame scapula_offset: socket_parent=/bodyset/scapula translation=(-0.00955 -0.034 0.009)
      SpatialTransform: axes_held_at_zero=(translation1 translation2 translation3)
        TransformAxis rotation1: coordinates=unrothum_r1 axis=(0.6376998 0.1186 0.7610998)
            LinearFunction(coefficients=1 0)
        TransformAxis rotation2: coordinates=unrothum_r3 axis=(-0.754084 0.297594 0.585487)
            LinearFunction(coefficients=1 0)
        TransformAxis rotation3: coordinates=unrothum_r2 axis=(0.1570949 0.9472686 -0.2792909) Constant(value=0)
    CustomJoint shoulder0: socket_parent_frame=scapphant_offset socket_child_frame=/bodyset/humphant
      Coordinate elv_angle: default_value=0 range=(-1.570796 2.268928) clamped=true
      PhysicalOffsetFrame scapphant_offset: socket_parent=/bodyset/scapphant translation=(0 0 0)
      SpatialTransform: axes_held_at_zero=(rotation1 rotation3 translation1 translation2 translation3)
        TransformAxis rotation2: coordinates=elv_angle axis=(0.0048 0.9990892 0.04240001)
            LinearFunction(coefficients=1 0)
    CustomJoint shoulder1: socket_parent_frame=humphant_offset socket_child_frame=/bodyset/humphant1
      Coordinate shoulder_elv: default_value=0 range=(0 3.141593) clamped=true
      Coordinate shoulder1_r2: default_value=0 range=(-99999.9 99999.9) clamped=false
      PhysicalOffsetFrame humphant_offset: socket_parent=/bodyset/humphant translation=(0 0 0)
      SpatialTransform: axes_held_at_zero=(rotation1 translation1 translation2 translation3)
        TransformAxis rotation2: coordinates=shoulder_elv axis=(-0.9982614 0.0023 0.05889802)
            LinearFunction(coefficients=1 0)
        TransformAxis rotation3: coordinates=shoulder1_r2 axis=(0.0048 0.9990892 0.04240001)
            LinearFunction(coefficients=1 0)
    CustomJoint shoulder2: socket_parent_frame=humphant1_offset socket_child_frame=/bodyset/humerus
      Coordinate shoulder_rot: default_value=0 range=(-1.570796 1.570796) clamped=true
      PhysicalOffsetFrame humphant1_offset: socket_parent=/bodyset/humphant1 translation=(0 0 0)
      SpatialTransform: axes_held_at_zero=(rotation1 rotation3 translation1 translation2 translation3)
        TransformAxis rotation2: coordinates=shoulder_rot axis=(0.0048 0.9990892 0.04240001)
            LinearFunction(coefficients=1 0)
    CustomJoint elbow: socket_parent_frame=humerus_offset socket_child_frame=/bodyset/ulna
      Coordinate elbow_flexion: default_value=0 range=(0 2.268928) clamped=true
      PhysicalOffsetFrame humerus_offset: socket_parent=/bodyset/humerus translation=(0.0061 -0.2904 -0.0123)
      SpatialTransform: axes_held_at_zero=(rotation1 rotation2 translation1 translation2 translation3)
        TransformAxis rotation3: coordinates=elbow_flexion axis=(0.04940001 0.03660001 0.9981083)
            LinearFunction(coefficients=1 0)
    CustomJoint radioulnar: socket_parent_frame=ulna_offset socket_child_frame=/bodyset/radius
      Coordinate pro_sup: default_value=0 range=(-1.570796 1.570796) clamped=true locked=true
      PhysicalOffsetFrame ulna_offset: socket_parent=/bodyset/ulna translation=(0.0004 -0.011503 0.019999)
      SpatialTransform: axes_held_at_zero=(rotation1 rotation3 translation1 translation2 translation3)
        TransformAxis rotation2: coordinates=pro_sup axis=(-0.01716099 0.9926656 -0.119668)
            LinearFunction(coefficients=1 0)
    CustomJoint radiocarpal: socket_parent_frame=radius_offset socket_child_frame=/bodyset/lunate
      Coordinate deviation: default_value=0 range=(-0.1745329 0.4363323) clamped=true locked=true
      Coordinate flexion: default_value=0 range=(-1.22173 1.22173) clamped=true locked=true
      PhysicalOffsetFrame radius_offset: socket_parent=/bodyset/radius translation=(0.018 -0.242 0.025)
      SpatialTransform: axes_held_at_zero=(rotation2 translation1 translation2 translation3)
        TransformAxis rotation1: coordinates=deviation axis=(-0.819064 -0.135611 -0.557444)
          SimmSpline: x=(-0.174533 0 0.436332) y=(-0.174533 0 0.436332)
        TransformAxis rotation3: coordinates=flexion axis=(0.9564267 -0.2522069 0.147104)
          SimmSpline: x=(-1.5708 1.5708) y=(-0.785398 0.785398)
    WeldJoint lun_scaph: socket_parent_frame=lunate_offset socket_child_frame=/bodyset/scaphoid
      PhysicalOffsetFrame lunate_offset: socket_parent=/bodyset/lunate translation=(0.012345 -0.004464 -0.001254)
    WeldJoint lun_pis: socket_parent_frame=lunate_offset socket_child_frame=/bodyset/pisiform
      PhysicalOffsetFrame lunate_offset: socket_parent=/bodyset/lunate translation=(-0.013388 -0.009886 -0.010593)
    WeldJoint lun_triq: socket_parent_frame=lunate_offset socket_child_frame=/bodyset/triquetrum
      PhysicalOffsetFrame lunate_offset: socket_parent=/bodyset/lunate translation=(-0.010784 -0.007499 -0.001289)
    CustomJoint proximal_distal: socket_parent_frame=lunate_offset socket_child_frame=/bodyset/capitate
      Coordinate proximal_distal_r1: default_value=0 range=(-99999.9 99999.9) clamped=false
      Coordinate proximal_distal_r3: default_value=0 range=(-99999.9 99999.9) clamped=false
      PhysicalOffsetFrame lunate_offset: socket_parent=/bodyset/lunate translation=(0.003992 -0.015054 0.002327)
      SpatialTransform: axes_held_at_zero=(rotation2 translation1 translation2 translation3)
        TransformAxis rotation1: coordinates=proximal_distal_r1 axis=(0.8991357 -0.3490529 -0.2640399)
            LinearFunction(coefficients=1 0)
        TransformAxis rotation3: coordinates=proximal_distal_r3 axis=(0.9971185 0.01069999 -0.07510096)
            LinearFunction(coefficients=1 0)
    WeldJoint cap_trpzm: socket_parent_frame=capitate_offset socket_child_frame=/bodyset/trapezium
      PhysicalOffsetFrame capitate_offset: socket_parent=/bodyset/capitate translation=(0.015293 -0.004569 -0.010308)
    WeldJoint cap_trpzd: socket_parent_frame=capitate_offset socket_child_frame=/bodyset/trapezoid
      PhysicalOffsetFrame capitate_offset: socket_parent=/bodyset/capitate translation=(0.009143 -0.004062 -0.002464)
    WeldJoint cap_ham: socket_parent_frame=capitate_offset socket_child_frame=/bodyset/hamate
      PhysicalOffsetFrame capitate_offset: socket_parent=/bodyset/capitate translation=(-0.010969 -0.002495 -0.00075)
    CustomJoint CMC1a: socket_parent_frame=trapezium_offset socket_child_frame=/bodyset/firstmc1
      Coordinate cmc_flexion: default_value=0 range=(-0.2617994 0.7853982) clamped=true locked=true
      PhysicalOffsetFrame trapezium_offset: socket_parent=/bodyset/trapezium translation=(0 0 0)
      SpatialTransform: axes_held_at_zero=(rotation1 rotation2 translation1 translation2 translation3)
        TransformAxis rotation3: coordinates=cmc_flexion axis=(-0.04239899 -0.6652858 0.7453838)
            LinearFunction(coefficients=1 0)
    CustomJoint CMC1b: socket_parent_frame=firstmc1_offset socket_child_frame=/bodyset/firstmc
      Coordinate cmc_abduction: default_value=0 range=(-0.4363323 0.4363323) clamped=true locked=true
      PhysicalOffsetFrame firstmc1_offset: socket_parent=/bodyset/firstmc1 translation=(0.0072 -0.0054 -0.0025)
      SpatialTransform: axes_held_at_zero=(rotation2 rotation3 translation1 translation2 translation3)
        TransformAxis rotation1: coordinates=cmc_abduction axis=(0.495557 0.731736 0.467959)
            LinearFunction(coefficients=1 0)
    WeldJoint CMC2: socket_parent_frame=capitate_offset socket_child_frame=/bodyset/secondmc
      PhysicalOffsetFrame capitate_offset: socket_parent=/bodyset/capitate translation=(0.014685 -0.03762 0.005032)
    WeldJoint CMC3: socket_parent_frame=capitate_offset socket_child_frame=/bodyset/thirdmc
      PhysicalOffsetFrame capitate_offset: socket_parent=/bodyset/capitate translation=(0.000477 -0.039239 0.007377)
    WeldJoint CMC4: socket_parent_frame=capitate_offset socket_child_frame=/bodyset/fourthmc
      PhysicalOffsetFrame capitate_offset: socket_parent=/bodyset/capitate translation=(-0.012046 -0.040519 0.003513)
    WeldJoint CMC5: socket_parent_frame=capitate_offset socket_child_frame=/bodyset/fifthmc
      PhysicalOffsetFrame capitate_offset: socket_parent=/bodyset/capitate translation=(-0.021896 -0.034683 -0.004218)
    CustomJoint MCP: socket_parent_frame=firstmc_offset socket_child_frame=/bodyset/proximal_thumb
      Coordinate mp_flexion: default_value=0 range=(-0.7853982 0.6981317) clamped=true locked=true
      PhysicalOffsetFrame firstmc_offset: socket_parent=/bodyset/firstmc translation=(0.0165 -0.0292 -0.0127)
      SpatialTransform: axes_held_at_zero=(rotation1 rotation2 translation1 translation2 translation3)
        TransformAxis rotation3: coordinates=mp_flexion axis=(-0.084295 -0.203488 0.975442)
            LinearFunction(coefficients=1 0)
    CustomJoint IP: socket_parent_frame=proximal_thumb_offset socket_child_frame=/bodyset/distal_thumb
      Coordinate ip_flexion: default_value=0 range=(-1.308997 0.4363323) clamped=true locked=true
      PhysicalOffsetFrame proximal_thumb_offset: socket_parent=/bodyset/proximal_thumb
          translation=(0.014 -0.0259 -0.0101)
      SpatialTransform: axes_held_at_zero=(rotation1 rotation2 translation1 translation2 translation3)
        TransformAxis rotation3: coordinates=ip_flexion axis=(-0.05010201 -0.4796231 0.8760431)
            LinearFunction(coefficients=1 0)
    CustomJoint 2MCP: socket_parent_frame=secondmc_offset socket_child_frame=/bodyset/2proxph
      Coordinate 2mcp_flexion: default_value=0 range=(-0.8726646 1.570796) clamped=true locked=true
      Coordinate 2mcp_abduction: default_value=0 range=(-0.2617994 0.2617994) clamped=true locked=true
      PhysicalOffsetFrame secondmc_offset: socket_parent=/bodyset/secondmc translation=(0.003501 -0.028243 0.00362)
      SpatialTransform: axes_held_at_zero=(rotation2 translation1 translation2 translation3)
        TransformAxis rotation1: coordinates=2mcp_flexion axis=(0.9975061 -0.03949601 0.05849401)
            LinearFunction(coefficients=1 0)
        TransformAxis rotation3: coordinates=2mcp_abduction axis=(-0.05499898 0.08589897 0.9947846)
            LinearFunction(coefficients=1 0)
    CustomJoint 2prox-midph: socket_parent_frame=2proxph_offset socket_child_frame=/bodyset/2midph
      Coordinate 2pm_flexion: default_value=0 range=(0 2.094395) clamped=true locked=true
      PhysicalOffsetFrame 2proxph_offset: socket_parent=/bodyset/2proxph translation=(0.007517 -0.041273 0.007326)
      SpatialTransform: axes_held_at_zero=(rotation2 rotation3 translation1 translation2 translation3)
        TransformAxis rotation1: coordinates=2pm_flexion axis=(0.9603449 0.040998 -0.275784)
            LinearFunction(coefficients=1 0)
    CustomJoint 2mid-distph: socket_parent_frame=2midph_offset socket_child_frame=/bodyset/2distph
      Coordinate 2md_flexion: default_value=0 range=(0 1.570796) clamped=true locked=true
      PhysicalOffsetFrame 2midph_offset: socket_parent=/bodyset/2midph translation=(0.003333 -0.024888 0.00122)
      SpatialTransform: axes_held_at_zero=(rotation2 rotation3 translation1 translation2 translation3)
        TransformAxis rotation1: coordinates=2md_flexion axis=(0.9789773 0.07690602 -0.1889151)
            LinearFunction(coefficients=1 0)
    WeldJoint 3MCP: socket_parent_frame=thirdmc_offset socket_child_frame=/bodyset/3proxph
      PhysicalOffsetFrame thirdmc_offset: socket_parent=/bodyset/thirdmc translation=(0.00024 -0.02629 0.001778)
    WeldJoint 3prox-midph: socket_parent_frame=3proxph_offset socket_child_frame=/bodyset/3midph
      PhysicalOffsetFrame 3proxph_offset: socket_parent=/bodyset/3proxph translation=(0.00165 -0.044211 0.00623)
    WeldJoint 3mid-distph: socket_parent_frame=3midph_offset socket_child_frame=/bodyset/3distph
      PhysicalOffsetFrame 3midph_offset: socket_parent=/bodyset/3midph translation=(0.001365 -0.029047 0.001954)
    WeldJoint 4MCP: socket_parent_frame=fourthmc_offset socket_child_frame=/bodyset/4proxph
      PhysicalOffsetFrame fourthmc_offset: socket_parent=/bodyset/fourthmc translation=(-0.00183 -0.023689 -0.000173)
    WeldJoint 4prox-midph: socket_parent_frame=4proxph_offset socket_child_frame=/bodyset/4midph
      PhysicalOffsetFrame 4proxph_offset: socket_parent=/bodyset/4proxph translation=(-0.003528 -0.040255 0.001345)
    WeldJoint 4mid-distph: socket_parent_frame=4midph_offset socket_child_frame=/bodyset/4distph
      PhysicalOffsetFrame 4midph_offset: socket_parent=/bodyset/4midph translation=(-0.002317 -0.024789 0.000563)
    WeldJoint 5MCP: socket_parent_frame=fifthmc_offset socket_child_frame=/bodyset/5proxph
      PhysicalOffsetFrame fifthmc_offset: socket_parent=/bodyset/fifthmc translation=(-0.001597 -0.021431 -0.001496)
    WeldJoint 5prox-midph: socket_parent_frame=5proxph_offset socket_child_frame=/bodyset/5midph
      PhysicalOffsetFrame 5proxph_offset: socket_parent=/bodyset/5proxph translation=(-0.005279 -0.035563 -0.002879)
    WeldJoint 5mid-distph: socket_parent_frame=5midph_offset socket_child_frame=/bodyset/5distph
      PhysicalOffsetFrame 5midph_offset: socket_parent=/bodyset/5midph translation=(-0.002871 -0.020677 -0.002243)
    CustomJoint bicpt: socket_parent_frame=radius_offset socket_child_frame=/bodyset/bicpt
      Coordinate bicpt_tx: default_value=0 range=(-99999.9 99999.9) clamped=false
      Coordinate bicpt_ty: default_value=-0.0276 range=(-99999.9 99999.9) clamped=false
      Coordinate bicpt_tz: default_value=-0.0043 range=(-99999.9 99999.9) clamped=false
      PhysicalOffsetFrame radius_offset: socket_parent=/bodyset/radius translation=(0 0 0)
      SpatialTransform: axes_held_at_zero=(rotation1 rotation2 rotation3)
        TransformAxis translation1: coordinates=bicpt_tx axis=(1 0 0) LinearFunction(coefficients=1 0)
        TransformAxis translation2: coordinates=bicpt_ty axis=(0 1 0) LinearFunction(coefficients=1 0)
        TransformAxis translation3: coordinates=bicpt_tz axis=(0 0 1) LinearFunction(coefficients=1 0)
    CustomJoint bicpt2: socket_parent_frame=radius_offset socket_child_frame=/bodyset/bicpt2
      Coordinate bicpt2_tx: default_value=0.0146695 range=(-99999.9 99999.9) clamped=false
      Coordinate bicpt2_ty: default_value=-0.0102 range=(-99999.9 99999.9) clamped=false
      Coordinate bicpt2_tz: default_value=-0.01061843 range=(-99999.9 99999.9) clamped=false
      PhysicalOffsetFrame radius_offset: socket_parent=/bodyset/radius translation=(0 0 0)
      SpatialTransform: axes_held_at_zero=(rotation1 rotation2 rotation3)
        TransformAxis translation1: coordinates=bicpt2_tx axis=(1 0 0) LinearFunction(coefficients=1 0)
        TransformAxis translation2: coordinates=bicpt2_ty axis=(0 1 0) LinearFunction(coefficients=1 0)
        TransformAxis translation3: coordinates=bicpt2_tz axis=(0 0 1) LinearFunction(coefficients=1 0)
    CustomJoint ptpt: socket_parent_frame=ulna_offset socket_child_frame=/bodyset/ptpt
      Coordinate ptpt_tx: default_value=0.00755 range=(-99999.9 99999.9) clamped=false
      Coordinate ptpt_ty: default_value=-0.0649 range=(-99999.9 99999.9) clamped=false
      Coordinate ptpt_tz: default_value=-5e-5 range=(-99999.9 99999.9) clamped=false
      PhysicalOffsetFrame ulna_offset: socket_parent=/bodyset/ulna translation=(0 0 0)
      SpatialTransform: axes_held_at_zero=(rotation1 rotation2 rotation3)
        TransformAxis translation1: coordinates=ptpt_tx axis=(1 0 0) LinearFunction(coefficients=1 0)
        TransformAxis translation2: coordinates=ptpt_ty axis=(0 1 0) LinearFunction(coefficients=1 0)
        TransformAxis translation3: coordinates=ptpt_tz axis=(0 0 1) LinearFunction(coefficients=1 0)
    CustomJoint FCUpt: socket_parent_frame=radius_offset socket_child_frame=/bodyset/FCUpt
      Coordinate FCUpt_tx: default_value=0.004 range=(-99999.9 99999.9) clamped=false
      Coordinate FCUpt_ty: default_value=-0.1841 range=(-99999.9 99999.9) clamped=false
      Coordinate FCUpt_tz: default_value=0.0005 range=(-99999.9 99999.9) clamped=false
      PhysicalOffsetFrame radius_offset: socket_parent=/bodyset/radius translation=(0 0 0)
      SpatialTransform: axes_held_at_zero=(rotation1 rotation2 rotation3)
        TransformAxis translation1: coordinates=FCUpt_tx axis=(1 0 0) LinearFunction(coefficients=1 0)
        TransformAxis translation2: coordinates=FCUpt_ty axis=(0 1 0) LinearFunction(coefficients=1 0)
        TransformAxis translation3: coordinates=FCUpt_tz axis=(0 0 1) LinearFunction(coefficients=1 0)
    CustomJoint EDCpt: socket_parent_frame=radius_offset socket_child_frame=/bodyset/EDCpt
      Coordinate EDCpt_tx: default_value=0 range=(-99999.9 99999.9) clamped=false
      Coordinate EDCpt_ty: default_value=0 range=(-99999.9 99999.9) clamped=false
      Coordinate EDCpt_tz: default_value=0 range=(-99999.9 99999.9) clamped=false
      PhysicalOffsetFrame radius_offset: socket_parent=/bodyset/radius translation=(0 0 0)
      SpatialTransform: axes_held_at_zero=(rotation1 rotation2 rotation3)
        TransformAxis translation1: coordinates=EDCpt_tx axis=(1 0 0) LinearFunction(coefficients=1 0)
        TransformAxis translation2: coordinates=EDCpt_ty axis=(0 1 0) LinearFunction(coefficients=1 0)
        TransformAxis translation3: coordinates=EDCpt_tz axis=(0 0 1) LinearFunction(coefficients=1 0)
    CustomJoint APLpt: socket_parent_frame=capitate_offset socket_child_frame=/bodyset/APLpt
      Coordinate APLpt_tx: default_value=0 range=(-99999.9 99999.9) clamped=false
      Coordinate APLpt_ty: default_value=0 range=(-99999.9 99999.9) clamped=false
      Coordinate APLpt_tz: default_value=0 range=(-99999.9 99999.9) clamped=false
      PhysicalOffsetFrame capitate_offset: socket_parent=/bodyset/capitate translation=(0 0 0)
      SpatialTransform: axes_held_at_zero=(rotation1 rotation2 rotation3)
        TransformAxis translation1: coordinates=APLpt_tx axis=(1 0 0) LinearFunction(coefficients=1 0)
        TransformAxis translation2: coordinates=APLpt_ty axis=(0 1 0) LinearFunction(coefficients=1 0)
        TransformAxis translation3: coordinates=APLpt_tz axis=(0 0 1) LinearFunction(coefficients=1 0)
    CustomJoint FPLpt: socket_parent_frame=capitate_offset socket_child_frame=/bodyset/FPLpt
      Coordinate FPLpt_tx: default_value=0 range=(-99999.9 99999.9) clamped=false
      Coordinate FPLpt_ty: default_value=0 range=(-99999.9 99999.9) clamped=false
      Coordinate FPLpt_tz: default_value=0 range=(-99999.9 99999.9) clamped=false
      PhysicalOffsetFrame capitate_offset: socket_parent=/bodyset/capitate translation=(0 0 0)
      SpatialTransform: axes_held_at_zero=(rotation1 rotation2 rotation3)
        TransformAxis translation1: coordinates=FPLpt_tx axis=(1 0 0) LinearFunction(coefficients=1 0)
        TransformAxis translation2: coordinates=FPLpt_ty axis=(0 1 0) LinearFunction(coefficients=1 0)
        TransformAxis translation3: coordinates=FPLpt_tz axis=(0 0 1) LinearFunction(coefficients=1 0)
    CustomJoint FPLpt2: socket_parent_frame=capitate_offset socket_child_frame=/bodyset/FPLpt2
      Coordinate FPLpt2_tx: default_value=0 range=(-99999.9 99999.9) clamped=false
      Coordinate FPLpt2_ty: default_value=0 range=(-99999.9 99999.9) clamped=false
      Coordinate FPLpt2_tz: default_value=0 range=(-99999.9 99999.9) clamped=false
      PhysicalOffsetFrame capitate_offset: socket_parent=/bodyset/capitate translation=(0 0 0)
      SpatialTransform: axes_held_at_zero=(rotation1 rotation2 rotation3)
        TransformAxis translation1: coordinates=FPLpt2_tx axis=(1 0 0) LinearFunction(coefficients=1 0)
        TransformAxis translation2: coordinates=FPLpt2_ty axis=(0 1 0) LinearFunction(coefficients=1 0)
        TransformAxis translation3: coordinates=FPLpt2_tz axis=(0 0 1) LinearFunction(coefficients=1 0)
    CustomJoint PEC1pt2: socket_parent_frame=humerus_offset socket_child_frame=/bodyset/PEC1pt2
      Coordinate PEC1pt2_tx: default_value=0 range=(-99999.9 99999.9) clamped=false
      Coordinate PEC1pt2_ty: default_value=0 range=(-99999.9 99999.9) clamped=false
      Coordinate PEC1pt2_tz: default_value=0 range=(-99999.9 99999.9) clamped=false
      PhysicalOffsetFrame humerus_offset: socket_parent=/bodyset/humerus translation=(0 0 0)
      SpatialTransform: axes_held_at_zero=(rotation1 rotation2 rotation3)
        TransformAxis translation1: coordinates=PEC1pt2_tx axis=(1 0 0) LinearFunction(coefficients=1 0)
        TransformAxis translation2: coordinates=PEC1pt2_ty axis=(0 1 0) LinearFunction(coefficients=1 0)
        TransformAxis translation3: coordinates=PEC1pt2_tz axis=(0 0 1) LinearFunction(coefficients=1 0)
    CustomJoint PEC1pt3: socket_parent_frame=thorax_offset socket_child_frame=/bodyset/PEC1pt3
      Coordinate PEC1pt3_tx: default_value=0 range=(-99999.9 99999.9) clamped=false
      Coordinate PEC1pt3_ty: default_value=0 range=(-99999.9 99999.9) clamped=false
      Coordinate PEC1pt3_tz: default_value=0 range=(-99999.9 99999.9) clamped=false
      PhysicalOffsetFrame thorax_offset: socket_parent=/bodyset/thorax translation=(0 0 0)
      SpatialTransform: axes_held_at_zero=(rotation1 rotation2 rotation3)
        TransformAxis translation1: coordinates=PEC1pt3_tx axis=(1 0 0) LinearFunction(coefficients=1 0)
        TransformAxis translation2: coordinates=PEC1pt3_ty axis=(0 1 0) LinearFunction(coefficients=1 0)
        TransformAxis translation3: coordinates=PEC1pt3_tz axis=(0 0 1) LinearFunction(coefficients=1 0)
    CustomJoint PEC2pt2: socket_parent_frame=humerus_offset socket_child_frame=/bodyset/PEC2pt2
      Coordinate PEC2pt2_tx: default_value=0 range=(-99999.9 99999.9) clamped=false
      Coordinate PEC2pt2_ty: default_value=0 range=(-99999.9 99999.9) clamped=false
      Coordinate PEC2pt2_tz: default_value=0 range=(-99999.9 99999.9) clamped=false
      PhysicalOffsetFrame humerus_offset: socket_parent=/bodyset/humerus translation=(0 0 0)
      SpatialTransform: axes_held_at_zero=(rotation1 rotation2 rotation3)
        TransformAxis translation1: coordinates=PEC2pt2_tx axis=(1 0 0) LinearFunction(coefficients=1 0)
        TransformAxis translation2: coordinates=PEC2pt2_ty axis=(0 1 0) LinearFunction(coefficients=1 0)
        TransformAxis translation3: coordinates=PEC2pt2_tz axis=(0 0 1) LinearFunction(coefficients=1 0)
    CustomJoint PEC2pt3: socket_parent_frame=thorax_offset socket_child_frame=/bodyset/PEC2pt3
      Coordinate PEC2pt3_tx: default_value=0 range=(-99999.9 99999.9) clamped=false
      Coordinate PEC2pt3_ty: default_value=0 range=(-99999.9 99999.9) clamped=false
      Coordinate PEC2pt3_tz: default_value=0 range=(-99999.9 99999.9) clamped=false
      PhysicalOffsetFrame thorax_offset: socket_parent=/bodyset/thorax translation=(0 0 0)
      SpatialTransform: axes_held_at_zero=(rotation1 rotation2 rotation3)
        TransformAxis translation1: coordinates=PEC2pt3_tx axis=(1 0 0) LinearFunction(coefficients=1 0)
        TransformAxis translation2: coordinates=PEC2pt3_ty axis=(0 1 0) LinearFunction(coefficients=1 0)
        TransformAxis translation3: coordinates=PEC2pt3_tz axis=(0 0 1) LinearFunction(coefficients=1 0)
    CustomJoint PEC3pt2: socket_parent_frame=humerus_offset socket_child_frame=/bodyset/PEC3pt2
      Coordinate PEC3pt2_tx: default_value=0 range=(-99999.9 99999.9) clamped=false
      Coordinate PEC3pt2_ty: default_value=0 range=(-99999.9 99999.9) clamped=false
      Coordinate PEC3pt2_tz: default_value=0 range=(-99999.9 99999.9) clamped=false
      PhysicalOffsetFrame humerus_offset: socket_parent=/bodyset/humerus translation=(0 0 0)
      SpatialTransform: axes_held_at_zero=(rotation1 rotation2 rotation3)
        TransformAxis translation1: coordinates=PEC3pt2_tx axis=(1 0 0) LinearFunction(coefficients=1 0)
        TransformAxis translation2: coordinates=PEC3pt2_ty axis=(0 1 0) LinearFunction(coefficients=1 0)
        TransformAxis translation3: coordinates=PEC3pt2_tz axis=(0 0 1) LinearFunction(coefficients=1 0)
    CustomJoint PEC3pt3: socket_parent_frame=thorax_offset socket_child_frame=/bodyset/PEC3pt3
      Coordinate PEC3pt3_tx: default_value=0 range=(-99999.9 99999.9) clamped=false
      Coordinate PEC3pt3_ty: default_value=0.00022532 range=(-99999.9 99999.9) clamped=false
      Coordinate PEC3pt3_tz: default_value=0 range=(-99999.9 99999.9) clamped=false
      PhysicalOffsetFrame thorax_offset: socket_parent=/bodyset/thorax translation=(0 0 0)
      SpatialTransform: axes_held_at_zero=(rotation1 rotation2 rotation3)
        TransformAxis translation1: coordinates=PEC3pt3_tx axis=(1 0 0) LinearFunction(coefficients=1 0)
        TransformAxis translation2: coordinates=PEC3pt3_ty axis=(0 1 0) LinearFunction(coefficients=1 0)
        TransformAxis translation3: coordinates=PEC3pt3_tz axis=(0 0 1) LinearFunction(coefficients=1 0)
    CustomJoint DELT2pt2a: socket_parent_frame=humerus_offset socket_child_frame=/bodyset/DELT2pt2a
      Coordinate DELT2pt2a_tx: default_value=0 range=(-99999.9 99999.9) clamped=false
      Coordinate DELT2pt2a_ty: default_value=0 range=(-99999.9 99999.9) clamped=false
      Coordinate DELT2pt2a_tz: default_value=0 range=(-99999.9 99999.9) clamped=false
      PhysicalOffsetFrame humerus_offset: socket_parent=/bodyset/humerus translation=(0 0 0)
      SpatialTransform: axes_held_at_zero=(rotation1 rotation2 rotation3)
        TransformAxis translation1: coordinates=DELT2pt2a_tx axis=(1 0 0) LinearFunction(coefficients=1 0)
        TransformAxis translation2: coordinates=DELT2pt2a_ty axis=(0 1 0) LinearFunction(coefficients=1 0)
        TransformAxis translation3: coordinates=DELT2pt2a_tz axis=(0 0 1) LinearFunction(coefficients=1 0)
    CustomJoint DELT2pt2: socket_parent_frame=DELT2pt2a_offset socket_child_frame=/bodyset/DELT2pt2
      Coordinate DELT2pt2_tx: default_value=-0.00043991 range=(-99999.9 99999.9) clamped=false
      Coordinate DELT2pt2_ty: default_value=0 range=(-99999.9 99999.9) clamped=false
      Coordinate DELT2pt2_tz: default_value=0 range=(-99999.9 99999.9) clamped=false
      PhysicalOffsetFrame DELT2pt2a_offset: socket_parent=/bodyset/DELT2pt2a translation=(0 0 0)
      SpatialTransform: axes_held_at_zero=(rotation1 rotation2 rotation3)
        TransformAxis translation1: coordinates=DELT2pt2_tx axis=(1 0 0) LinearFunction(coefficients=1 0)
        TransformAxis translation2: coordinates=DELT2pt2_ty axis=(0 1 0) LinearFunction(coefficients=1 0)
        TransformAxis translation3: coordinates=DELT2pt2_tz axis=(0 0 1) LinearFunction(coefficients=1 0)
    CustomJoint LAT1pt2: socket_parent_frame=scapula_offset socket_child_frame=/bodyset/LAT1pt2
      Coordinate LAT1pt2_tx: default_value=0 range=(-99999.9 99999.9) clamped=false
      Coordinate LAT1pt2_ty: default_value=0 range=(-99999.9 99999.9) clamped=false
      Coordinate LAT1pt2_tz: default_value=0 range=(-99999.9 99999.9) clamped=false
      PhysicalOffsetFrame scapula_offset: socket_parent=/bodyset/scapula translation=(0 0 0)
      SpatialTransform: axes_held_at_zero=(rotation1 rotation2 rotation3)
        TransformAxis translation1: coordinates=LAT1pt2_tx axis=(1 0 0) LinearFunction(coefficients=1 0)
        TransformAxis translation2: coordinates=LAT1pt2_ty axis=(0 1 0) LinearFunction(coefficients=1 0)
        TransformAxis translation3: coordinates=LAT1pt2_tz axis=(0 0 1) LinearFunction(coefficients=1 0)
    CustomJoint LAT1pt3: socket_parent_frame=scapula_offset socket_child_frame=/bodyset/LAT1pt3
      Coordinate LAT1pt3_tx: default_value=0 range=(-99999.9 99999.9) clamped=false
      Coordinate LAT1pt3_ty: default_value=0 range=(-99999.9 99999.9) clamped=false
      Coordinate LAT1pt3_tz: default_value=0 range=(-99999.9 99999.9) clamped=false
      PhysicalOffsetFrame scapula_offset: socket_parent=/bodyset/scapula translation=(0 0 0)
      SpatialTransform: axes_held_at_zero=(rotation1 rotation2 rotation3)
        TransformAxis translation1: coordinates=LAT1pt3_tx axis=(1 0 0) LinearFunction(coefficients=1 0)
        TransformAxis translation2: coordinates=LAT1pt3_ty axis=(0 1 0) LinearFunction(coefficients=1 0)
        TransformAxis translation3: coordinates=LAT1pt3_tz axis=(0 0 1) LinearFunction(coefficients=1 0)
    CustomJoint LAT2pt2: socket_parent_frame=scapula_offset socket_child_frame=/bodyset/LAT2pt2
      Coordinate LAT2pt2_tx: default_value=0 range=(-99999.9 99999.9) clamped=false
      Coordinate LAT2pt2_ty: default_value=0 range=(-99999.9 99999.9) clamped=false
      Coordinate LAT2pt2_tz: default_value=0 range=(-99999.9 99999.9) clamped=false
      PhysicalOffsetFrame scapula_offset: socket_parent=/bodyset/scapula translation=(0 0 0)
      SpatialTransform: axes_held_at_zero=(rotation1 rotation2 rotation3)
        TransformAxis translation1: coordinates=LAT2pt2_tx axis=(1 0 0) LinearFunction(coefficients=1 0)
        TransformAxis translation2: coordinates=LAT2pt2_ty axis=(0 1 0) LinearFunction(coefficients=1 0)
        TransformAxis translation3: coordinates=LAT2pt2_tz axis=(0 0 1) LinearFunction(coefficients=1 0)
    CustomJoint LAT2pt3: socket_parent_frame=scapula_offset socket_child_frame=/bodyset/LAT2pt3
      Coordinate LAT2pt3_tx: default_value=0 range=(-99999.9 99999.9) clamped=false
      Coordinate LAT2pt3_ty: default_value=0 range=(-99999.9 99999.9) clamped=false
      Coordinate LAT2pt3_tz: default_value=0 range=(-99999.9 99999.9) clamped=false
      PhysicalOffsetFrame scapula_offset: socket_parent=/bodyset/scapula translation=(0 0 0)
      SpatialTransform: axes_held_at_zero=(rotation1 rotation2 rotation3)
        TransformAxis translation1: coordinates=LAT2pt3_tx axis=(1 0 0) LinearFunction(coefficients=1 0)
        TransformAxis translation2: coordinates=LAT2pt3_ty axis=(0 1 0) LinearFunction(coefficients=1 0)
        TransformAxis translation3: coordinates=LAT2pt3_tz axis=(0 0 1) LinearFunction(coefficients=1 0)
    CustomJoint LAT3pt2: socket_parent_frame=scapula_offset socket_child_frame=/bodyset/LAT3pt2
      Coordinate LAT3pt2_tx: default_value=0 range=(-99999.9 99999.9) clamped=false
      Coordinate LAT3pt2_ty: default_value=0 range=(-99999.9 99999.9) clamped=false
      Coordinate LAT3pt2_tz: default_value=0 range=(-99999.9 99999.9) clamped=false
      PhysicalOffsetFrame scapula_offset: socket_parent=/bodyset/scapula translation=(0 0 0)
      SpatialTransform: axes_held_at_zero=(rotation1 rotation2 rotation3)
        TransformAxis translation1: coordinates=LAT3pt2_tx axis=(1 0 0) LinearFunction(coefficients=1 0)
        TransformAxis translation2: coordinates=LAT3pt2_ty axis=(0 1 0) LinearFunction(coefficients=1 0)
        TransformAxis translation3: coordinates=LAT3pt2_tz axis=(0 0 1) LinearFunction(coefficients=1 0)
    CustomJoint LAT3pt3: socket_parent_frame=scapula_offset socket_child_frame=/bodyset/LAT3pt3
      Coordinate LAT3pt3_tx: default_value=0 range=(-99999.9 99999.9) clamped=false
      Coordinate LAT3pt3_ty: default_value=0 range=(-99999.9 99999.9) clamped=false
      Coordinate LAT3pt3_tz: default_value=0 range=(-99999.9 99999.9) clamped=false
      PhysicalOffsetFrame scapula_offset: socket_parent=/bodyset/scapula translation=(0 0 0)
      SpatialTransform: axes_held_at_zero=(rotation1 rotation2 rotation3)
        TransformAxis translation1: coordinates=LAT3pt3_tx axis=(1 0 0) LinearFunction(coefficients=1 0)
        TransformAxis translation2: coordinates=LAT3pt3_ty axis=(0 1 0) LinearFunction(coefficients=1 0)
        TransformAxis translation3: coordinates=LAT3pt3_tz axis=(0 0 1) LinearFunction(coefficients=1 0)
  ConstraintSet:
    CoordinateCouplerConstraint sternoclavicular_r2_con: independent_coordinate_names=shoulder_elv
        dependent_coordinate_name=sternoclavicular_r2
      coupled_coordinates_function: SimmSpline: x=(0 2.61799) y=(0 -0.633555)
    CoordinateCouplerConstraint sternoclavicular_r3_con: independent_coordinate_names=shoulder_elv
        dependent_coordinate_name=sternoclavicular_r3
      coupled_coordinates_function: SimmSpline: x=(0 3.14159) y=(0 0.322013)
    CoordinateCouplerConstraint unrotscap_r2_con: independent_coordinate_names=shoulder_elv
        dependent_coordinate_name=unrotscap_r2
      coupled_coordinates_function: SimmSpline: x=(0 2.61799) y=(0 0.633555)
    CoordinateCouplerConstraint unrotscap_r3_con: independent_coordinate_names=shoulder_elv
        dependent_coordinate_name=unrotscap_r3
      coupled_coordinates_function: SimmSpline: x=(0 3.14159) y=(0 -0.322013)
    CoordinateCouplerConstraint acromioclavicular_r1_con: independent_coordinate_names=shoulder_elv
        dependent_coordinate_name=acromioclavicular_r1
      coupled_coordinates_function: SimmSpline: x=(0 2.61799) y=(0 0.466003)
    CoordinateCouplerConstraint acromioclavicular_r2_con: independent_coordinate_names=shoulder_elv
        dependent_coordinate_name=acromioclavicular_r2
      coupled_coordinates_function: SimmSpline: x=(0 2.61799) y=(0 -0.128282)
    CoordinateCouplerConstraint acromioclavicular_r3_con: independent_coordinate_names=shoulder_elv
        dependent_coordinate_name=acromioclavicular_r3
      coupled_coordinates_function: SimmSpline: x=(0 2.61799) y=(0 1.03673)
    CoordinateCouplerConstraint unrothum_r1_con: independent_coordinate_names=shoulder_elv
        dependent_coordinate_name=unrothum_r1
      coupled_coordinates_function: SimmSpline: x=(0 2.61799) y=(0 -0.466003)
    CoordinateCouplerConstraint unrothum_r2_con: independent_coordinate_names=shoulder_elv
        dependent_coordinate_name=unrothum_r2
      coupled_coordinates_function: SimmSpline: x=(0 2.61799) y=(0 0.128282)
    CoordinateCouplerConstraint unrothum_r3_con: independent_coordinate_names=shoulder_elv
        dependent_coordinate_name=unrothum_r3
      coupled_coordinates_function: SimmSpline: x=(0 2.61799) y=(0 -1.03673)
    CoordinateCouplerConstraint shoulder1_r2_con: independent_coordinate_names=elv_angle
        dependent_coordinate_name=shoulder1_r2
      coupled_coordinates_function: SimmSpline: x=(-1.5708 3.14159) y=(1.5708 -3.14159)
    CoordinateCouplerConstraint proximal_distal_r1_con: independent_coordinate_names=deviation
        dependent_coordinate_name=proximal_distal_r1
      coupled_coordinates_function: SimmSpline: x=(-0.174533 0 0.436332) y=(-0.261799 0 0.436332)
    CoordinateCouplerConstraint proximal_distal_r3_con: independent_coordinate_names=flexion
        dependent_coordinate_name=proximal_distal_r3
      coupled_coordinates_function: SimmSpline: x=(-1.22173 1.22173) y=(-0.610865 0.610865)
    CoordinateCouplerConstraint bicpt_tx_con: independent_coordinate_names=elbow_flexion
        dependent_coordinate_name=bicpt_tx
      coupled_coordinates_function: SimmSpline: x=(0 2.26893) y=(-0.0001 0.0042)
    CoordinateCouplerConstraint bicpt_ty_con: independent_coordinate_names=elbow_flexion
        dependent_coordinate_name=bicpt_ty
      coupled_coordinates_function: SimmSpline: x=(0 2.26893) y=(-0.0276 -0.0425)
    CoordinateCouplerConstraint bicpt_tz_con: independent_coordinate_names=elbow_flexion
        dependent_coordinate_name=bicpt_tz
      coupled_coordinates_function: SimmSpline: x=(0 2.26893) y=(-0.0043 -0.0067)
    CoordinateCouplerConstraint bicpt2_tx_con: independent_coordinate_names=pro_sup dependent_coordinate_name=bicpt2_tx
      coupled_coordinates_function: SimmSpline: x=(-1.5708 -0.610865 1.57823) y=(-0.003 0.01 0.01376)
    CoordinateCouplerConstraint bicpt2_ty_con: independent_coordinate_names=elbow_flexion
        dependent_coordinate_name=bicpt2_ty
      coupled_coordinates_function: SimmSpline: x=(0 2.27483) y=(-0.0102 -0.045607)
    CoordinateCouplerConstraint bicpt2_tz_con: independent_coordinate_names=pro_sup dependent_coordinate_name=bicpt2_tz
      coupled_coordinates_function: SimmSpline: x=(-1.5708 -0.610865 1.57561) y=(-0.0095 -0.011533 -0.000331)
    CoordinateCouplerConstraint ptpt_tx_con: independent_coordinate_names=pro_sup dependent_coordinate_name=ptpt_tx
      coupled_coordinates_function: SimmSpline: x=(-1.5708 1.5708) y=(0.0142 0.0009)
    CoordinateCouplerConstraint ptpt_ty_con: independent_coordinate_names=pro_sup dependent_coordinate_name=ptpt_ty
      coupled_coordinates_function: SimmSpline: x=(-1.5708 1.5708) y=(-0.0606 -0.0692)
    CoordinateCouplerConstraint ptpt_tz_con: independent_coordinate_names=pro_sup dependent_coordinate_name=ptpt_tz
      coupled_coordinates_function: SimmSpline: x=(-1.5708 1.5708) y=(0.0072 -0.0073)
    CoordinateCouplerConstraint FCUpt_tx_con: independent_coordinate_names=pro_sup dependent_coordinate_name=FCUpt_tx
      coupled_coordinates_function: SimmSpline: x=(-1.5708 0 1.5708) y=(-0.0027 0.004 0.0132)
    CoordinateCouplerConstraint FCUpt_ty_con: independent_coordinate_names=pro_sup dependent_coordinate_name=FCUpt_ty
      coupled_coordinates_function: SimmSpline: x=(-1.5708 0 1.5708) y=(-0.1838 -0.1841 -0.1821)
    CoordinateCouplerConstraint FCUpt_tz_con: independent_coordinate_names=pro_sup dependent_coordinate_name=FCUpt_tz
      coupled_coordinates_function: SimmSpline: x=(-1.5708 0 1.5708) y=(0.0069 0.0005 0.0002)
    CoordinateCouplerConstraint EDCpt_tx_con: independent_coordinate_names=pro_sup dependent_coordinate_name=EDCpt_tx
      coupled_coordinates_function: SimmSpline: x=(-1.5708 0 1.5708) y=(0.0108 0 -0.0108)
    CoordinateCouplerConstraint EDCpt_ty_con: independent_coordinate_names=pro_sup dependent_coordinate_name=EDCpt_ty
      coupled_coordinates_function: SimmSpline: x=(-1.5708 0 1.5708) y=(-0.0013 0 0.0038)
    CoordinateCouplerConstraint EDCpt_tz_con: independent_coordinate_names=pro_sup dependent_coordinate_name=EDCpt_tz
      coupled_coordinates_function: SimmSpline: x=(-1.5708 0 1.5708) y=(-0.0035 0 -0.00089)
    CoordinateCouplerConstraint APLpt_tx_con: independent_coordinate_names=flexion dependent_coordinate_name=APLpt_tx
      coupled_coordinates_function: SimmSpline: x=(-1.22173 0 1.22173) y=(0 0 -0.0025)
    CoordinateCouplerConstraint APLpt_ty_con: independent_coordinate_names=flexion dependent_coordinate_name=APLpt_ty
      coupled_coordinates_function: SimmSpline: x=(-1.22173 0 1.22173) y=(0 0 -0.001)
    CoordinateCouplerConstraint APLpt_tz_con: independent_coordinate_names=flexion dependent_coordinate_name=APLpt_tz
      coupled_coordinates_function: SimmSpline: x=(-1.22173 0 1.22173) y=(0 0 -0.005)
    CoordinateCouplerConstraint FPLpt_tx_con: independent_coordinate_names=flexion dependent_coordinate_name=FPLpt_tx
      coupled_coordinates_function: SimmSpline: x=(-1.22173 0 1.22173) y=(0 0 -0.0032)
    CoordinateCouplerConstraint FPLpt_ty_con: independent_coordinate_names=flexion dependent_coordinate_name=FPLpt_ty
      coupled_coordinates_function: SimmSpline: x=(-1.22173 0 1.22173) y=(0 0 -0.0096)
    CoordinateCouplerConstraint FPLpt_tz_con: independent_coordinate_names=flexion dependent_coordinate_name=FPLpt_tz
      coupled_coordinates_function: SimmSpline: x=(-1.22173 0 1.22173) y=(0 0 -0.0054)
    CoordinateCouplerConstraint FPLpt2_tx_con: independent_coordinate_names=cmc_flexion
        dependent_coordinate_name=FPLpt2_tx
      coupled_coordinates_function: SimmSpline: x=(-0.261799 0 0.0872665 0.183675 0.376492 0.785303)
          y=(-0.0032 0 4e-5 3.2e-5 8e-6 0)
    CoordinateCouplerConstraint FPLpt2_ty_con: independent_coordinate_names=cmc_flexion
        dependent_coordinate_name=FPLpt2_ty
      coupled_coordinates_function: SimmSpline: x=(-0.261799 0 0.785398) y=(0.0005 0 0)
    CoordinateCouplerConstraint FPLpt2_tz_con: independent_coordinate_names=cmc_flexion
        dependent_coordinate_name=FPLpt2_tz
      coupled_coordinates_function: SimmSpline: x=(-0.261799 0 0.785398) y=(0.0006 0 0)
    CoordinateCouplerConstraint PEC1pt2_tx_con: independent_coordinate_names=shoulder_elv
        dependent_coordinate_name=PEC1pt2_tx
      coupled_coordinates_function: SimmSpline: x=(0 3.14159) y=(0 0.0059)
    CoordinateCouplerConstraint PEC1pt2_ty_con: independent_coordinate_names=shoulder_elv
        dependent_coordinate_name=PEC1pt2_ty
      coupled_coordinates_function: SimmSpline: x=(0 3.14159) y=(0 0.0207)
    CoordinateCouplerConstraint PEC1pt2_tz_con: independent_coordinate_names=shoulder_elv
        dependent_coordinate_name=PEC1pt2_tz
      coupled_coordinates_function: SimmSpline: x=(0 3.14159) y=(0 0.0144)
    CoordinateCouplerConstraint PEC1pt3_tx_con: independent_coordinate_names=shoulder_elv
        dependent_coordinate_name=PEC1pt3_tx
      coupled_coordinates_function: SimmSpline: x=(0 3.14159) y=(0 -0.0193)
    CoordinateCouplerConstraint PEC1pt3_ty_con: independent_coordinate_names=shoulder_elv
        dependent_coordinate_name=PEC1pt3_ty
      coupled_coordinates_function: SimmSpline: x=(0 3.14159) y=(0 0.0466)
    CoordinateCouplerConstraint PEC1pt3_tz_con: independent_coordinate_names=shoulder_elv
        dependent_coordinate_name=PEC1pt3_tz
      coupled_coordinates_function: SimmSpline: x=(0 3.14159) y=(0 -0.0442)
    CoordinateCouplerConstraint PEC2pt2_tx_con: independent_coordinate_names=shoulder_elv
        dependent_coordinate_name=PEC2pt2_tx
      coupled_coordinates_function: SimmSpline: x=(0 3.14159) y=(0 0.0059)
    CoordinateCouplerConstraint PEC2pt2_ty_con: independent_coordinate_names=shoulder_elv
        dependent_coordinate_name=PEC2pt2_ty
      coupled_coordinates_function: SimmSpline: x=(0 3.14159) y=(0 0.0207)
    CoordinateCouplerConstraint PEC2pt2_tz_con: independent_coordinate_names=shoulder_elv
        dependent_coordinate_name=PEC2pt2_tz
      coupled_coordinates_function: SimmSpline: x=(0 3.14159) y=(0 0.0144)
    CoordinateCouplerConstraint PEC2pt3_tx_con: independent_coordinate_names=shoulder_elv
        dependent_coordinate_name=PEC2pt3_tx
      coupled_coordinates_function: SimmSpline: x=(0 3.14159) y=(0 0.0013)
    CoordinateCouplerConstraint PEC2pt3_ty_con: independent_coordinate_names=shoulder_elv
        dependent_coordinate_name=PEC2pt3_ty
      coupled_coordinates_function: SimmSpline: x=(0 3.14159) y=(0 0.0432)
    CoordinateCouplerConstraint PEC2pt3_tz_con: independent_coordinate_names=shoulder_elv
        dependent_coordinate_name=PEC2pt3_tz
      coupled_coordinates_function: SimmSpline: x=(0 3.14159) y=(0 -0.0227)
    CoordinateCouplerConstraint PEC3pt2_tx_con: independent_coordinate_names=shoulder_elv
        dependent_coordinate_name=PEC3pt2_tx
      coupled_coordinates_function: SimmSpline: x=(0 0.747517 3.14159) y=(0 0.002482 0.0059)
    CoordinateCouplerConstraint PEC3pt2_ty_con: independent_coordinate_names=shoulder_elv
        dependent_coordinate_name=PEC3pt2_ty
      coupled_coordinates_function: SimmSpline: x=(0 3.13149) y=(0 0.011474)
    CoordinateCouplerConstraint PEC3pt2_tz_con: independent_coordinate_names=shoulder_elv
        dependent_coordinate_name=PEC3pt2_tz
      coupled_coordinates_function: SimmSpline: x=(0 0.623056 2.29124 3.12533) y=(0 0.009968 0.018193 0.017746)
    CoordinateCouplerConstraint PEC3pt3_tx_con: independent_coordinate_names=shoulder_elv
        dependent_coordinate_name=PEC3pt3_tx
      coupled_coordinates_function: SimmSpline: x=(0 3.14159) y=(0 0)
    CoordinateCouplerConstraint PEC3pt3_ty_con: independent_coordinate_names=shoulder_elv
        dependent_coordinate_name=PEC3pt3_ty
      coupled_coordinates_function: SimmSpline: x=(0.0101016 1.59605 3.14159) y=(0.000222 0.011219 0.0441)
    CoordinateCouplerConstraint PEC3pt3_tz_con: independent_coordinate_names=shoulder_elv
        dependent_coordinate_name=PEC3pt3_tz
      coupled_coordinates_function: SimmSpline: x=(0 3.14159) y=(0 0)
    CoordinateCouplerConstraint DELT2pt2a_tx_con: independent_coordinate_names=shoulder_elv
        dependent_coordinate_name=DELT2pt2a_tx
      coupled_coordinates_function: SimmSpline: x=(0 3.14159) y=(0 -0.0169)
    CoordinateCouplerConstraint DELT2pt2a_ty_con: independent_coordinate_names=shoulder_elv
        dependent_coordinate_name=DELT2pt2a_ty
      coupled_coordinates_function: SimmSpline: x=(0 3.14159) y=(0 -0.0781)
    CoordinateCouplerConstraint DELT2pt2a_tz_con: independent_coordinate_names=shoulder_elv
        dependent_coordinate_name=DELT2pt2a_tz
      coupled_coordinates_function: SimmSpline: x=(0 1.22229 3.14159) y=(0 -0.005395 -0.0363)
    CoordinateCouplerConstraint DELT2pt2_tx_con: independent_coordinate_names=shoulder_rot
        dependent_coordinate_name=DELT2pt2_tx
      coupled_coordinates_function: SimmSpline: x=(-1.5708 -0.0101503 0.349046) y=(0.0214 4.9e-5 -0.020005)
    CoordinateCouplerConstraint DELT2pt2_ty_con: independent_coordinate_names=shoulder_rot
        dependent_coordinate_name=DELT2pt2_ty
      coupled_coordinates_function: SimmSpline: x=(-1.5708 -1.18189 -0.169482 0 0.349066)
          y=(-0.0029 -0.002148 -0.000139 0 -0.001644)
    CoordinateCouplerConstraint DELT2pt2_tz_con: independent_coordinate_names=shoulder_rot
        dependent_coordinate_name=DELT2pt2_tz
      coupled_coordinates_function: SimmSpline: x=(-1.5708 -0.496661 0 0.342893) y=(-0.0455 -0.006762 0 -0.00573)
    CoordinateCouplerConstraint LAT1pt2_tx_con: independent_coordinate_names=shoulder_elv
        dependent_coordinate_name=LAT1pt2_tx
      coupled_coordinates_function: SimmSpline: x=(0 3.14159) y=(0 -0.0021)
    CoordinateCouplerConstraint LAT1pt2_ty_con: independent_coordinate_names=shoulder_elv
        dependent_coordinate_name=LAT1pt2_ty
      coupled_coordinates_function: SimmSpline: x=(0 3.14159) y=(0 0.0352)
    CoordinateCouplerConstraint LAT1pt2_tz_con: independent_coordinate_names=shoulder_elv
        dependent_coordinate_name=LAT1pt2_tz
      coupled_coordinates_function: SimmSpline: x=(0 3.14159) y=(0 -0.0144)
    CoordinateCouplerConstraint LAT1pt3_tx_con: independent_coordinate_names=shoulder_elv
        dependent_coordinate_name=LAT1pt3_tx
      coupled_coordinates_function: SimmSpline: x=(0 3.14159) y=(0 0.0058)
    CoordinateCouplerConstraint LAT1pt3_ty_con: independent_coordinate_names=shoulder_elv
        dependent_coordinate_name=LAT1pt3_ty
      coupled_coordinates_function: SimmSpline: x=(0 3.14159) y=(0 0.0508)
    CoordinateCouplerConstraint LAT1pt3_tz_con: independent_coordinate_names=shoulder_elv
        dependent_coordinate_name=LAT1pt3_tz
      coupled_coordinates_function: SimmSpline: x=(0 3.14159) y=(0 -0.042)
    CoordinateCouplerConstraint LAT2pt2_tx_con: independent_coordinate_names=shoulder_elv
        dependent_coordinate_name=LAT2pt2_tx
      coupled_coordinates_function: SimmSpline: x=(0 3.14159) y=(0 -0.0141)
    CoordinateCouplerConstraint LAT2pt2_ty_con: independent_coordinate_names=shoulder_elv
        dependent_coordinate_name=LAT2pt2_ty
      coupled_coordinates_function: SimmSpline: x=(0 3.14159) y=(0 0.0305)
    CoordinateCouplerConstraint LAT2pt2_tz_con: independent_coordinate_names=shoulder_elv
        dependent_coordinate_name=LAT2pt2_tz
      coupled_coordinates_function: SimmSpline: x=(0 3.14159) y=(0 -0.0129)
    CoordinateCouplerConstraint LAT2pt3_tx_con: independent_coordinate_names=shoulder_elv
        dependent_coordinate_name=LAT2pt3_tx
      coupled_coordinates_function: SimmSpline: x=(0 3.14159) y=(0 -0.0294)
    CoordinateCouplerConstraint LAT2pt3_ty_con: independent_coordinate_names=shoulder_elv
        dependent_coordinate_name=LAT2pt3_ty
      coupled_coordinates_function: SimmSpline: x=(0 3.14159) y=(0 0.0644)
    CoordinateCouplerConstraint LAT2pt3_tz_con: independent_coordinate_names=shoulder_elv
        dependent_coordinate_name=LAT2pt3_tz
      coupled_coordinates_function: SimmSpline: x=(0 3.14159) y=(0 -0.0721)
    CoordinateCouplerConstraint LAT3pt2_tx_con: independent_coordinate_names=shoulder_elv
        dependent_coordinate_name=LAT3pt2_tx
      coupled_coordinates_function: SimmSpline: x=(0 3.14159) y=(0 -0.0552)
    CoordinateCouplerConstraint LAT3pt2_ty_con: independent_coordinate_names=shoulder_elv
        dependent_coordinate_name=LAT3pt2_ty
      coupled_coordinates_function: SimmSpline: x=(0 3.14159) y=(0 0.0341)
    CoordinateCouplerConstraint LAT3pt2_tz_con: independent_coordinate_names=shoulder_elv
        dependent_coordinate_name=LAT3pt2_tz
      coupled_coordinates_function: SimmSpline: x=(0 3.14159) y=(0 -0.0173)
    CoordinateCouplerConstraint LAT3pt3_tx_con: independent_coordinate_names=shoulder_elv
        dependent_coordinate_name=LAT3pt3_tx
      coupled_coordinates_function: SimmSpline: x=(0 3.14159) y=(0 -0.0366)
    CoordinateCouplerConstraint LAT3pt3_ty_con: independent_coordinate_names=shoulder_elv
        dependent_coordinate_name=LAT3pt3_ty
      coupled_coordinates_function: SimmSpline: x=(0 3.14159) y=(0 0.0744)
    CoordinateCouplerConstraint LAT3pt3_tz_con: independent_coordinate_names=shoulder_elv
        dependent_coordinate_name=LAT3pt3_tz
      coupled_coordinates_function: SimmSpline: x=(0 3.14159) y=(0 -0.0901)
  ForceSet:
    Millard2012EquilibriumMuscle [values shared by the 41 below unless stated]: min_control=0.01 max_control=1
        fiber_damping=0.05 activation_time_constant=0.01 [seconds] deactivation_time_constant=0.04 [seconds]
        minimum_activation=0.01
      ActiveForceLengthCurve: minimum_value=0
      ForceVelocityCurve: concentric_slope_at_vmax=0 concentric_slope_near_vmax=0.25 isometric_slope=5
          eccentric_slope_at_vmax=0 eccentric_slope_near_vmax=0.15 max_eccentric_velocity_force_multiplier=1.4
      FiberForceLengthCurve
      TendonForceLengthCurve
    Millard2012EquilibriumMuscle DELT1: max_isometric_force=1142.6 optimal_fiber_length=0.0976
        tendon_slack_length=0.0976 pennation_angle_at_optimal=0.3839724 [radians]
      PathPoint P1: humerus (0.00896 -0.11883 0.00585)
      PathPoint P2: humerus (0.01623 -0.11033 0.00412)
      PathPoint P3: scapula (0.04347 -0.03252 0.00099)
      PathPoint P4: clavicle (-0.014 0.01106 0.08021)
      PathWrap delt2hum: wrap_object=delt2hum method=hybrid
      PathWrap DELT1hh: wrap_object=DELT1hh method=hybrid range=(2 3)
    Millard2012EquilibriumMuscle DELT2: max_isometric_force=1142.6 optimal_fiber_length=0.1078
        tendon_slack_length=0.1095 pennation_angle_at_optimal=0.2617994
      PathPoint P1: humerus (0.00461 -0.13611 0.0056)
      PathPoint P2: DELT2pt2 (0.0272 0.00535 0.04807)
      PathPoint P3: scapula (5e-5 0.00294 0.02233)
      PathPoint P4: scapula (-0.01078 -0.00034 0.0062)
      PathWrap Deltoid2: wrap_object=Deltoid2 method=hybrid
      PathWrap delt2hum: wrap_object=delt2hum method=hybrid
      PathWrap TMAJ_LAT_PEC_CORBhh: wrap_object=TMAJ_LAT_PEC_CORBhh method=hybrid
    Millard2012EquilibriumMuscle DELT3: max_isometric_force=259.88 optimal_fiber_length=0.1367
        tendon_slack_length=0.038 pennation_angle_at_optimal=0.3141593
      PathPoint P1: scapula (-0.05573 0.00122 -0.02512)
      PathPoint P2: scapula (-0.07247 -0.03285 0.01233)
      PathPoint P3: humerus (0.00206 -0.07602 0.01045)
      PathWrap Delt3: wrap_object=Delt3 method=hybrid
      PathWrap delt3hum: wrap_object=delt3hum method=hybrid
      PathWrap TMAJ_LAT_PEC_CORBhh: wrap_object=TMAJ_LAT_PEC_CORBhh method=hybrid
    Millard2012EquilibriumMuscle SUPSP: max_isometric_force=487.82 optimal_fiber_length=0.0682
        tendon_slack_length=0.0395 pennation_angle_at_optimal=0.1221731
      PathPoint P1: humerus (0.00256 0.01063 0.02593)
      PathPoint P2: scapula (-0.01918 0.00127 -0.01271)
      PathPoint P3: scapula (-0.044 -0.01512 -0.05855)
      PathWrap SUPSP: wrap_object=SUPSP method=hybrid
    Millard2012EquilibriumMuscle INFSP: max_isometric_force=1210.84 optimal_fiber_length=0.0755
        tendon_slack_length=0.0308 pennation_angle_at_optimal=0.3228859
      PathPoint P1: humerus (-0.00887 0.00484 0.02448)
      PathPoint P2: scapula (-0.07382 -0.05476 -0.04781)
      PathWrap INFSP: wrap_object=INFSP method=hybrid
      PathWrap INFSP_and_TMIN_hum_head: wrap_object=INFSP_and_TMIN_hum_head method=hybrid
    Millard2012EquilibriumMuscle SUBSC: max_isometric_force=1377.81 optimal_fiber_length=0.0873
        tendon_slack_length=0.033 pennation_angle_at_optimal=0.3490659
      PathPoint P1: humerus (0.01403 0.0084 -0.01331)
      PathPoint P2: scapula (-0.01831 -0.05223 -0.02457)
      PathPoint P3: scapula (-0.07246 -0.03943 -0.06475)
      PathWrap SUBSCAP: wrap_object=SUBSCAP method=hybrid
    Millard2012EquilibriumMuscle TMIN: max_isometric_force=354.25 optimal_fiber_length=0.0741
        tendon_slack_length=0.0713 pennation_angle_at_optimal=0.418879
      PathPoint P1: humerus (-0.0011 -0.01264 0.02156)
      PathPoint P2: scapula (-0.09473 -0.07991 -0.04737)
      PathPoint P3: scapula (-0.09643 -0.08121 -0.05298)
      PathWrap TMIN: wrap_object=TMIN method=hybrid
      PathWrap INFSP_and_TMIN_hum_head: wrap_object=INFSP_and_TMIN_hum_head method=hybrid
      PathWrap TMINhum: wrap_object=TMINhum method=hybrid
    Millard2012EquilibriumMuscle TMAJ: max_isometric_force=425.39 optimal_fiber_length=0.1624 tendon_slack_length=0.02
        pennation_angle_at_optimal=0.2792527
      PathPoint P1: humerus (0.00998 -0.05419 -0.00568)
      PathPoint P2: scapula (-0.10264 -0.10319 -0.05829)
      PathPoint P3: scapula (-0.10489 -0.10895 -0.07117)
      PathWrap TMAJ_LAThum: wrap_object=TMAJ_LAThum method=hybrid
      PathWrap LAT_TMAJhh: wrap_object=LAT_TMAJhh method=hybrid
      PathWrap LAT_TMAJ2hh: wrap_object=LAT_TMAJ2hh method=hybrid
    Millard2012EquilibriumMuscle PECM1: max_isometric_force=364.41 optimal_fiber_length=0.1442
        tendon_slack_length=0.0028 pennation_angle_at_optimal=0.296706
      PathPoint P1: humerus (0.01169 -0.04191 0.0078)
      PathPoint P2: PEC1pt2 (0.01615 -0.04045 -0.00577)
      PathPoint P3: PEC1pt3 (0.00958 -0.01509 0.12664)
      PathPoint P4: clavicle (0.00321 -0.00013 0.05113)
      PathWrap Thorax: wrap_object=Thorax method=hybrid
      PathWrap PEC12hum: wrap_object=PEC12hum method=hybrid
      PathWrap PEC1hh: wrap_object=PEC1hh method=hybrid
    Millard2012EquilibriumMuscle PECM2: max_isometric_force=515.41 optimal_fiber_length=0.1385
        tendon_slack_length=0.089 pennation_angle_at_optimal=0.4363323
      PathPoint P1: humerus (0.01274 -0.04289 0.00785)
      PathPoint P2: PEC1pt2 (0.01453 -0.04568 -0.00687)
      PathPoint P3: PEC2pt3 (0.02018 -0.04165 0.1269)
      PathPoint P4: thorax (0.03091 -0.03922 0.09705)
      PathPoint P5: thorax (0.02769 -0.04498 0.02271)
      PathWrap Thorax: wrap_object=Thorax method=hybrid
      PathWrap PEC12hum: wrap_object=PEC12hum method=hybrid
      PathWrap TMAJ_LAT_PEC_CORBhh: wrap_object=TMAJ_LAT_PEC_CORBhh method=hybrid
      PathWrap PEC23hh: wrap_object=PEC23hh method=hybrid
    Millard2012EquilibriumMuscle PECM3: max_isometric_force=390.55 optimal_fiber_length=0.1385
        tendon_slack_length=0.132 pennation_angle_at_optimal=0.4363323
      PathPoint P1: humerus (0.01269 -0.04375 0.0075)
      PathPoint P2: PEC3pt2 (0.01243 -0.05157 -0.01807)
      PathPoint P3: PEC3pt3 (0.02984 -0.071 0.1151)
      PathPoint P4: thorax (0.0525 -0.08417 0.08935)
      PathPoint P5: thorax (0.05724 -0.11654 0.03787)
      PathWrap Thorax: wrap_object=Thorax method=hybrid
      PathWrap PEC3hum: wrap_object=PEC3hum method=hybrid
      PathWrap PEC23hh: wrap_object=PEC23hh method=hybrid
    Millard2012EquilibriumMuscle LAT1: max_isometric_force=389.1 optimal_fiber_length=0.254 tendon_slack_length=0.12
        pennation_angle_at_optimal=0.4363323
      PathPoint P1: humerus (0.0105 -0.03415 -0.00653)
      PathPoint P2: LAT1pt2 (-0.07947 -0.08581 -0.02188)
      PathPoint P3: LAT1pt3 (-0.11215 -0.09779 -0.05322)
      PathPoint P4: thorax (-0.11828 -0.10118 0.03316)
      PathPoint P5: thorax (-0.09578 -0.11724 0.00882)
      PathWrap TMAJ_LAThum: wrap_object=TMAJ_LAThum method=hybrid
      PathWrap LAT_TMAJhh: wrap_object=LAT_TMAJhh method=hybrid
      PathWrap LAT_TMAJ2hh: wrap_object=LAT_TMAJ2hh method=hybrid
    Millard2012EquilibriumMuscle LAT2: max_isometric_force=389.1 optimal_fiber_length=0.2324 tendon_slack_length=0.1765
        pennation_angle_at_optimal=0.3316126
      PathPoint P1: humerus (0.00968 -0.04071 -0.00611)
      PathPoint P2: LAT2pt2 (-0.0764 -0.1022 -0.01808)
      PathPoint P3: LAT2pt3 (-0.10054 -0.13969 -0.05258)
      PathPoint P4: thorax (-0.10992 -0.16908 0.02878)
      PathPoint P5: thorax (-0.07186 -0.18818 0.00815)
      PathWrap TMAJ_LAThum: wrap_object=TMAJ_LAThum method=hybrid
      PathWrap LAT_TMAJhh: wrap_object=LAT_TMAJhh method=hybrid
      PathWrap LAT_TMAJ2hh: wrap_object=LAT_TMAJ2hh method=hybrid
    Millard2012EquilibriumMuscle LAT3: max_isometric_force=281.66 optimal_fiber_length=0.2789
        tendon_slack_length=0.1403 pennation_angle_at_optimal=0.3665191
      PathPoint P1: humerus (0.01208 -0.03922 -0.00416)
      PathPoint P2: LAT3pt2 (-0.05678 -0.13303 -0.0213)
      PathPoint P3: LAT3pt3 (-0.09449 -0.17553 -0.04606)
      PathPoint P4: thorax (-0.11157 -0.19387 0.05532)
      PathPoint P5: thorax (-0.07117 -0.24858 0.00907)
      PathWrap TMAJ_LAThum: wrap_object=TMAJ_LAThum method=hybrid
      PathWrap LAT_TMAJhh: wrap_object=LAT_TMAJhh method=hybrid
      PathWrap LAT_TMAJ2hh: wrap_object=LAT_TMAJ2hh method=hybrid
    Millard2012EquilibriumMuscle CORB: max_isometric_force=242.46 optimal_fiber_length=0.0932 tendon_slack_length=0.097
        pennation_angle_at_optimal=0
      PathPoint P1: scapula (0.0125 -0.04127 -0.02652)
      PathPoint P2: scapula (0.00483 -0.06958 -0.01563)
      PathPoint P3: humerus (0.00743 -0.15048 -0.00782)
      PathWrap CORBhum: wrap_object=CORBhum method=hybrid
      PathWrap TMAJ_LAT_PEC_CORBhh: wrap_object=TMAJ_LAT_PEC_CORBhh method=hybrid
    Millard2012EquilibriumMuscle TRIlong: max_isometric_force=798.52 optimal_fiber_length=0.134
        tendon_slack_length=0.143 pennation_angle_at_optimal=0.2094395
      PathPoint P1: scapula (-0.04565 -0.04073 -0.01377)
      PathPoint P2: humerus (-0.02714 -0.11441 -0.00664)
      PathPoint P3: humerus (-0.03184 -0.22637 -0.01217)
      PathPoint P4: humerus (-0.01743 -0.26757 -0.01208)
      PathPoint P5: ulna (-0.0219 0.01046 -0.00078)
      PathWrap TRI: wrap_object=TRI method=hybrid
      PathWrap TRIlonghh: wrap_object=TRIlonghh method=hybrid
      PathWrap TRIlongglen: wrap_object=TRIlongglen method=hybrid
    Millard2012EquilibriumMuscle TRIlat: max_isometric_force=624.3 optimal_fiber_length=0.1138
        tendon_slack_length=0.098 pennation_angle_at_optimal=0.1570796
      PathPoint P1: humerus (-0.00599 -0.12646 0.00428)
      PathPoint P2: humerus (-0.02344 -0.14528 0.00928)
      PathPoint P3: humerus (-0.03184 -0.22637 -0.01217)
      PathPoint P4: humerus (-0.01743 -0.26757 -0.01208)
      PathPoint P5: ulna (-0.0219 0.01046 -0.00078)
      PathWrap TRI: wrap_object=TRI method=hybrid
    Millard2012EquilibriumMuscle TRImed: max_isometric_force=624.3 optimal_fiber_length=0.1138
        tendon_slack_length=0.0908 pennation_angle_at_optimal=0.1570796
      PathPoint P1: humerus (-0.00838 -0.13695 -0.00906)
      PathPoint P2: humerus (-0.02601 -0.15139 -0.0108)
      PathPoint P3: humerus (-0.03184 -0.22637 -0.01217)
      PathPoint P4: humerus (-0.01743 -0.26757 -0.01208)
      PathPoint P5: ulna (-0.0219 0.01046 -0.00078)
      PathWrap TRI: wrap_object=TRI method=hybrid
    Millard2012EquilibriumMuscle ANC: max_isometric_force=350 optimal_fiber_length=0.027 tendon_slack_length=0.018
        pennation_angle_at_optimal=0
      PathPoint P1: humerus (-0.00744 -0.28359 0.00979)
      PathPoint P2: ulna (-0.02532 -0.00124 0.006)
      PathWrap ANC: wrap_object=ANC method=hybrid
    Millard2012EquilibriumMuscle BIClong: max_isometric_force=624.3 optimal_fiber_length=0.1157
        tendon_slack_length=0.2723 pennation_angle_at_optimal=0
      PathPoint P1: scapula (-0.03123 -0.02353 -0.01305)
      PathPoint P2: scapula (-0.02094 -0.01309 -0.00461)
      PathPoint P3: humerus (0.02131 0.01793 0.01028)
      PathPoint P4: humerus (0.02378 -0.00511 0.01201)
      PathPoint P5: humerus (0.01345 -0.02827 0.00136)
      PathPoint P6: humerus (0.01068 -0.07736 -0.00165)
      PathPoint P7: humerus (-0.01703 -0.12125 0.00024)
      PathPoint P8: humerus (0.0228 -0.1754 -0.0063)
      PathPoint P9: bicpt2 (0 0 0)
      ConditionalPathPoint P10: bicpt (0 0 0) socket_coordinate=/jointset/radioulnar/pro_sup
          range=(-0.638791 1.5708) [radians]
      PathPoint P11: radius (-0.002 -0.0375 -0.002)
      PathWrap Elbow_BIC_BRD: wrap_object=Elbow_BIC_BRD method=hybrid
      PathWrap BIClong: wrap_object=BIClong method=hybrid
    Millard2012EquilibriumMuscle BICshort: max_isometric_force=435.56 optimal_fiber_length=0.1321
        tendon_slack_length=0.1923 pennation_angle_at_optimal=0
      PathPoint P1: scapula (0.01268 -0.03931 -0.02625)
      PathPoint P2: scapula (0.00093 -0.06704 -0.01593)
      PathPoint P3: humerus (0.01117 -0.07576 -0.01101)
      PathPoint P4: humerus (0.01703 -0.12125 -0.01079)
      PathPoint P5: humerus (0.0228 -0.1754 -0.0063)
      PathPoint P6: bicpt2 (0 0 0)
      ConditionalPathPoint P7: bicpt (0 0 0) socket_coordinate=/jointset/radioulnar/pro_sup range=(-0.638791 1.5708)
      PathPoint P8: radius (-0.002 -0.0375 -0.002)
      PathWrap Elbow_BIC_BRD: wrap_object=Elbow_BIC_BRD method=hybrid
    Millard2012EquilibriumMuscle BRA: max_isometric_force=987.26 optimal_fiber_length=0.0858 tendon_slack_length=0.0535
        pennation_angle_at_optimal=0
      PathPoint P1: humerus (0.0068 -0.1739 -0.0036)
      ConditionalPathPoint P2: humerus (0 0 0) socket_coordinate=/jointset/elbow/elbow_flexion range=(0 0.813149)
      ConditionalPathPoint P3: ulna (0.00498 -0.01463 0.00128) socket_coordinate=/jointset/elbow/elbow_flexion
          range=(0 0.813149)
      PathPoint P4: ulna (-0.0032 -0.0239 0.0009)
    Millard2012EquilibriumMuscle BRD: max_isometric_force=261.33 optimal_fiber_length=0.1726 tendon_slack_length=0.133
        pennation_angle_at_optimal=0
      PathPoint P1: humerus (-0.0098 -0.19963 0.00223)
      PathPoint P2: radius (0.03577 -0.12742 0.02315)
      PathPoint P3: radius (0.0419 -0.221 0.0224)
      PathWrap Elbow_BIC_BRD: wrap_object=Elbow_BIC_BRD method=hybrid
    Millard2012EquilibriumMuscle ECRL: max_isometric_force=304.89 optimal_fiber_length=0.081 tendon_slack_length=0.224
        pennation_angle_at_optimal=0
      PathPoint P1: humerus (-0.0073 -0.2609 0.0091)
      PathPoint P2: radius (0.03195 -0.13463 0.02779)
      PathPoint P3: radius (0.04243 -0.23684 0.0362)
      PathPoint P4: secondmc (0.00249 0.0164 0.0008)
      PathWrap Elbow_PT_ECRL: wrap_object=Elbow_PT_ECRL method=hybrid
      PathWrap ECRL: wrap_object=ECRL method=hybrid
    Millard2012EquilibriumMuscle ECRB: max_isometric_force=100.52 optimal_fiber_length=0.0585
        tendon_slack_length=0.2223 pennation_angle_at_optimal=0.1553343
      PathPoint P1: humerus (0.01349 -0.29048 0.01698)
      PathPoint P2: radius (0.02905 -0.13086 0.02385)
      PathPoint P3: radius (0.03549 -0.22805 0.03937)
      PathPoint P4: thirdmc (0.00452 0.02788 0.00112)
      PathWrap ECRB: wrap_object=ECRB method=hybrid
    Millard2012EquilibriumMuscle ECU: max_isometric_force=93.17 optimal_fiber_length=0.0622 tendon_slack_length=0.2285
        pennation_angle_at_optimal=0.06108652
      PathPoint P1: humerus (0.00083 -0.28955 0.0188)
      PathPoint P2: ulna (-0.01391 -0.03201 0.02947)
      PathPoint P3: ulna (-0.01705 -0.05428 0.02868)
      PathPoint P4: ulna (-0.01793 -0.09573 0.03278)
      PathPoint P5: radius (-0.01421 -0.22696 0.03481)
      PathPoint P6: fifthmc (-0.00061 0.02067 0.00294)
      PathWrap ECU: wrap_object=ECU method=hybrid
    Millard2012EquilibriumMuscle FCR: max_isometric_force=73.96 optimal_fiber_length=0.0628 tendon_slack_length=0.244
        pennation_angle_at_optimal=0.05410521
      PathPoint P1: humerus (0.00083 -0.28955 0.0188)
      PathPoint P2: radius (-0.01391 -0.03201 0.02947)
      PathPoint P3: secondmc (-0.01705 -0.05428 0.02868)
      PathWrap Elbow_PT_ECRL: wrap_object=Elbow_PT_ECRL method=hybrid
      PathWrap FCR: wrap_object=FCR method=hybrid
    Millard2012EquilibriumMuscle FCU: max_isometric_force=128.93 optimal_fiber_length=0.0509 tendon_slack_length=0.265
        pennation_angle_at_optimal=0.2111848
      PathPoint P1: humerus (0.00219 -0.2774 -0.0388)
      PathPoint P2: FCUpt (0.00549 0 0)
      PathPoint P3: radius (0.01082 -0.22327 0.00969)
      PathPoint P4: fifthmc (0.00154 0.01703 -0.0033)
      PathWrap Elbow_PT_ECRL: wrap_object=Elbow_PT_ECRL method=hybrid
      PathWrap FCU: wrap_object=FCU method=hybrid
    Millard2012EquilibriumMuscle FDSL: max_isometric_force=16.55 optimal_fiber_length=0.0515 tendon_slack_length=0.3383
        pennation_angle_at_optimal=0.08726646
      PathPoint P1: humerus (0.00421 -0.27598 -0.03864)
      PathPoint P2: radius (0.01377 -0.18718 0.00205)
      PathPoint P3: capitate (-0.00235 -0.01393 -0.01376)
      PathPoint P4: fourthmc (-0.00294 0.00846 -0.01213)
      PathPoint P5: fifthmc (-0.00032 -0.01968 -0.00757)
      PathPoint P6: 5proxph (-0.00323 -0.03568 -0.00417)
      PathPoint P7: 5midph (-0.0026 -0.01983 -0.0035)
      PathWrap Elbow_PT_ECRL: wrap_object=Elbow_PT_ECRL method=hybrid
      PathWrap FDS: wrap_object=FDS method=hybrid
    Millard2012EquilibriumMuscle FDSR: max_isometric_force=57.9 optimal_fiber_length=0.0736 tendon_slack_length=0.328
        pennation_angle_at_optimal=0.06981317
      PathPoint P1: humerus (0.00479 -0.2788 -0.03731)
      PathPoint P2: radius (0.01571 -0.18666 0.00267)
      PathPoint P3: capitate (-0.00082 -0.01344 -0.01359)
      PathPoint P4: thirdmc (-0.00914 0.00544 -0.01085)
      PathPoint P5: fourthmc (-0.0029 -0.02334 -0.00767)
      PathPoint P6: 4proxph (-0.00172 -0.03947 -0.00102)
      PathPoint P7: 4midph (-2e-5 -0.02501 0.00029)
      PathWrap Elbow_PT_ECRL: wrap_object=Elbow_PT_ECRL method=hybrid
      PathWrap FDS: wrap_object=FDS method=hybrid
    Millard2012EquilibriumMuscle FDSM: max_isometric_force=91.03 optimal_fiber_length=0.0749 tendon_slack_length=0.295
        pennation_angle_at_optimal=0.122173
      PathPoint P1: ulna (-0.00669 -0.02713 -0.00191)
      PathPoint P2: radius (0.01899 -0.18706 0.00424)
      PathPoint P3: capitate (0.0068 -0.01377 -0.01399)
      PathPoint P4: thirdmc (0.00128 0.00639 -0.00952)
      PathPoint P5: thirdmc (0.00263 -0.02478 -0.00183)
      PathPoint P6: 3proxph (0.00252 -0.04307 0.00417)
      PathPoint P7: 3midph (0.00155 -0.02773 0.00067)
      PathWrap FDS: wrap_object=FDS method=hybrid
    Millard2012EquilibriumMuscle FDPL: max_isometric_force=79.65 optimal_fiber_length=0.0749 tendon_slack_length=0.2819
        pennation_angle_at_optimal=0.1396263
      PathPoint FDPL_P1: ulna (-0.00628 -0.03214 0.00254)
      PathPoint FDPL_P2: radius (0.01409 -0.18516 0.00861)
      PathPoint FDPL_P3: capitate (-0.00088 -0.01027 -0.01188)
      PathPoint FDPL_P4: fourthmc (-0.00686 0.0089 -0.00619)
      PathPoint FDPL_P5: fifthmc (-0.00185 -0.01878 -0.00706)
      PathPoint FDPL_P6: 5proxph (-0.0049 -0.03465 -0.00598)
      PathPoint FDPL_P7: 5distph (-0.00032 -0.00433 -0.00165)
      PathWrap FDP: wrap_object=FDP method=hybrid
    Millard2012EquilibriumMuscle FDPR: max_isometric_force=64.08 optimal_fiber_length=0.0798 tendon_slack_length=0.282
        pennation_angle_at_optimal=0.122173
      PathPoint P1: ulna (-0.00502 -0.03374 0.00273)
      PathPoint P2: radius (0.0158 -0.18629 0.00803)
      PathPoint P3: capitate (0.00106 -0.01177 -0.01184)
      PathPoint P4: thirdmc (-0.0104 0.00473 -0.00804)
      PathPoint P5: fourthmc (-0.00289 -0.02297 -0.00609)
      PathPoint P6: 4proxph (-0.00304 -0.04002 -0.00075)
      PathPoint P7: 4distph (0.0001 -0.0066 -0.00066)
      PathWrap FDP: wrap_object=FDP method=hybrid
    Millard2012EquilibriumMuscle FDPM: max_isometric_force=81.65 optimal_fiber_length=0.0835 tendon_slack_length=0.293
        pennation_angle_at_optimal=0.1047198
      PathPoint P1: ulna (-0.00522 -0.03327 0.0021)
      PathPoint P2: radius (0.01906 -0.18644 0.00785)
      PathPoint P3: capitate (0.00335 -0.0128 -0.01144)
      PathPoint P4: thirdmc (-0.00128 0.00609 -0.00838)
      PathPoint P5: thirdmc (0.00034 -0.02347 -0.00303)
      PathPoint P6: 3proxph (0.00102 -0.04333 0.00294)
      PathPoint P7: 3distph (0.00023 -0.00505 -0.00226)
      PathWrap FDP: wrap_object=FDP method=hybrid
    Millard2012EquilibriumMuscle FDPI: max_isometric_force=68.27 optimal_fiber_length=0.0749 tendon_slack_length=0.2935
        pennation_angle_at_optimal=0.122173
      PathPoint P1: ulna (-0.00647 -0.03176 0.0028)
      PathPoint P2: radius (0.0208 -0.1856 0.00915)
      PathPoint P3: capitate (0.00896 -0.01168 -0.01212)
      PathPoint P4: secondmc (-0.00432 0.00663 -0.00248)
      PathPoint P5: secondmc (0.0042 -0.02262 -0.00499)
      PathPoint P6: 2proxph (0.00581 -0.03555 0.00306)
      PathPoint P7: 2distph (0.00046 -0.0046 -0.00301)
      PathWrap FDP: wrap_object=FDP method=hybrid
      PathWrap 2ndMCP: wrap_object=2ndmcp method=hybrid
    Millard2012EquilibriumMuscle EDCL: max_isometric_force=13.11 optimal_fiber_length=0.065 tendon_slack_length=0.2965
        pennation_angle_at_optimal=0.03490659
      PathPoint P1: humerus (-0.0004 -0.28831 0.0187)
      PathPoint P2: EDCpt (0.0013 -0.03888 0.01405)
      PathPoint P3: radius (0.00993 -0.22304 0.03618)
      PathPoint P4: fifthmc (-0.00478 -0.01915 0.00447)
      PathPoint P5: 5proxph (-0.00716 -0.03302 -0.00089)
      PathPoint P6: 5distph (-0.00142 0.00068 0.00115)
      PathWrap EDCL: wrap_object=EDCL method=hybrid
    Millard2012EquilibriumMuscle EDCR: max_isometric_force=34.04 optimal_fiber_length=0.0626 tendon_slack_length=0.327
        pennation_angle_at_optimal=0.05235988
      PathPoint P1: humerus (-0.00156 -0.28936 0.01782)
      PathPoint P2: EDCpt (0.0026 -0.03991 0.01552)
      PathPoint P3: radius (0.00882 -0.22366 0.04284)
      PathPoint P4: fourthmc (-0.00338 -0.0233 0.00513)
      PathPoint P5: 4proxph (-0.00546 -0.03868 0.00413)
      PathPoint P6: 4distph (-0.00171 -0.00375 0.00241)
      PathWrap EDCR: wrap_object=EDCR method=hybrid
    Millard2012EquilibriumMuscle EDCM: max_isometric_force=35.32 optimal_fiber_length=0.0724 tendon_slack_length=0.335
        pennation_angle_at_optimal=0.05235988
      PathPoint P1: humerus (0.00051 -0.28984 0.01949)
      PathPoint P2: EDCpt (0.00316 -0.03948 0.01528)
      PathPoint P3: radius (0.0144 -0.22323 0.04223)
      PathPoint P4: thirdmc (0.00131 -0.02342 0.00764)
      PathPoint P5: 3proxph (0.00179 -0.04239 0.01003)
      PathPoint P6: 3distph (0.00077 -0.01111 0.00201)
      PathWrap EDCM: wrap_object=EDCM method=hybrid
    Millard2012EquilibriumMuscle EDCI: max_isometric_force=18.26 optimal_fiber_length=0.07 tendon_slack_length=0.322
        pennation_angle_at_optimal=0.05235988
      PathPoint P1: humerus (0.00065 -0.28898 0.01869)
      PathPoint P2: EDCpt (0.00228 -0.03918 0.01483)
      PathPoint P3: radius (0.01533 -0.22314 0.04196)
      PathPoint P4: secondmc (0.00474 -0.02656 0.01293)
      PathPoint P5: 2proxph (0.00192 -0.01101 0.01021)
      PathPoint P6: 2proxph (0.00771 -0.04191 0.01399)
      PathPoint P7: 2midph (0.00123 -0.00941 0.00581)
      PathPoint P8: 2midph (0.0026 -0.01959 0.00363)
      PathPoint P9: 2distph (0.00025 -0.0037 0.00228)
      PathWrap EDCI: wrap_object=EDCI method=hybrid
      PathWrap Secondpm: wrap_object=Secondpm method=hybrid
      PathWrap Secondmd: wrap_object=Secondmd method=hybrid
    Millard2012EquilibriumMuscle EDM: max_isometric_force=25.25 optimal_fiber_length=0.0675 tendon_slack_length=0.322
        pennation_angle_at_optimal=0.05235988
      PathPoint P1: humerus (0.00089 -0.28919 0.01847)
      PathPoint P2: ulna (-0.00977 -0.03907 0.03085)
      PathPoint P3: ulna (-0.00755 -0.08267 0.03646)
      PathPoint P4: radius (0.00454 -0.22641 0.03678)
      PathPoint P5: fifthmc (0.00131 0.02436 0.00794)
      PathPoint P6: fifthmc (-0.00537 -0.01848 0.00316)
      PathPoint P7: 5proxph (-0.0054 -0.03237 0.00015)
      PathPoint P8: 5distph (-0.00226 -0.00334 0.00062)
      PathWrap EDM: wrap_object=EDM method=hybrid
    Millard2012EquilibriumMuscle EIP: max_isometric_force=21.7 optimal_fiber_length=0.0589 tendon_slack_length=0.186
        pennation_angle_at_optimal=0.1047198
      PathPoint P1: ulna (-0.00394 -0.16652 0.03682)
      PathPoint P2: ulna (0.00171 -0.17469 0.04049)
      PathPoint P3: radius (0.01076 -0.22783 0.03664)
      PathPoint P4: secondmc (-0.01081 0.01528 0.00681)
      PathPoint P5: secondmc (0.00441 -0.02602 0.01285)
      PathPoint P6: 2proxph (0.00171 -0.01033 0.00947)
      PathPoint P7: 2proxph (0.00714 -0.04133 0.01413)
      PathPoint P8: 2midph (0.00115 -0.00899 0.00597)
      PathPoint P9: 2midph (0.00294 -0.02043 0.00377)
      PathPoint P10: 2distph (0.00264 -0.01233 0.00266)
      PathWrap Extensor_ellipse: wrap_object=Extensor_ellipse method=hybrid
      PathWrap Secondpm: wrap_object=Secondpm range=(7 8)
      PathWrap Secondmd: wrap_object=Secondmd range=(9 10)
  MarkerSet:
    Marker RigidBody1_1: lunate (-0.1061691 0.006924 0.0844118)
    Marker RigidBody1_2: lunate (-0.1227622 -0.087732 0.1081807)
    Marker RigidBody1_3: lunate (-0.013 -0.03419 0.1)
    Marker RigidBody3_1: humerus (0.0186475 -0.1331236 0.1050229)
    Marker RigidBody3_2: humerus (-0.07851093 -0.1123948 0.1386467)
    Marker RigidBody3_3: humerus (-0.03512856 -0.0427176 0.1258772)
    Marker RigidBody4_1: thorax (0.11 -0.2 -0.03)
    Marker RigidBody4_2: thorax (0.1 -0.11 -0.026)
    Marker RigidBody4_3: thorax (0.1 -0.12 0.05)
    Marker RigidBody7_1: radius (-0.03394219 -0.03087427 0.1199653)
    Marker RigidBody7_2: radius (-0.09157637 -0.03043655 0.1301196)
    Marker RigidBody7_3: radius (0.001580371 -0.1211462 0.1162061)
